// SBML level 2 version 4

model testModel()
  // testModel
  // Value of Hematicrit? kPSAlb_Tumor1 kPSAlb_Tumor2 kPSAlb_Tumor3 BoneVas = (XX - RedMarrowVas) OR (XX - RedMarrow) bodyWeight = ? bodyHeight = ?

  // Compartments:
  compartment Tumor2Vas in Tumor2 = 0.05*(1 - hematocrit)*Tumor2; Tumor2Vas has MWBUILTINUNIT_liter;
  compartment Tumor2 = 1 MWBUILTINUNIT_liter;
  compartment Tumor2Int in Tumor2 = 0.38*Tumor2; Tumor2Int has MWBUILTINUNIT_liter;
  compartment Tumor2Bound in Tumor2 = 1 MWBUILTINUNIT_liter;
  compartment Tumor2Intern in Tumor2 = 1 MWBUILTINUNIT_liter;
  compartment Art = 0.06*V_p + 0.045*V_p; Art has MWBUILTINUNIT_liter;
  compartment Vein = 0.18*V_p + 0.045*V_p; Vein has MWBUILTINUNIT_liter;
  compartment Tumor1 = Tumor1Volume*Tumor1VolumeCoeff; Tumor1 has MWBUILTINUNIT_liter;
  compartment Tumor1Vas in Tumor1 = 0.05*(1 - hematocrit)*Tumor1; Tumor1Vas has MWBUILTINUNIT_liter;
  compartment Tumor1Int in Tumor1 = 0.38*Tumor1; Tumor1Int has MWBUILTINUNIT_liter;
  compartment Tumor1Bound in Tumor1 = 1 MWBUILTINUNIT_liter;
  compartment Tumor1Intern in Tumor1 = 1 MWBUILTINUNIT_liter;
  compartment Kidney = 1 MWBUILTINUNIT_liter;
  compartment KidneyVas in Kidney = 0.055*Kidney; KidneyVas has MWBUILTINUNIT_liter;
  compartment KidneyInt in Kidney = 0.15*Kidney; KidneyInt has MWBUILTINUNIT_liter;
  compartment KidneyBound in Kidney = 1 MWBUILTINUNIT_liter;
  compartment KidneyIntern in Kidney = 1 MWBUILTINUNIT_liter;
  compartment Heart = 0.341*bodyWeight/71*dLiterKg; Heart has MWBUILTINUNIT_liter;
  compartment HeartVas in Heart = 0.01*V_p; HeartVas has MWBUILTINUNIT_liter;
  compartment HeartInt in Heart = 3.7*HeartVas; HeartInt has MWBUILTINUNIT_liter;
  compartment SG = 1 MWBUILTINUNIT_liter;
  compartment SGVas in SG = 0.03*(1 - hematocrit)*SG; SGVas has MWBUILTINUNIT_liter;
  compartment SGInt in SG = 0.23*SG; SGInt has MWBUILTINUNIT_liter;
  compartment SGBound in SG = 1 MWBUILTINUNIT_liter;
  compartment SGIntern in SG = 1 MWBUILTINUNIT_liter;
  compartment Bone = 10.165*bodyWeight/71*dLiterKg - RedMarrow; Bone has MWBUILTINUNIT_liter;
  compartment BoneVas in Bone = 0.07*V_p - RedMarrowVas; BoneVas has MWBUILTINUNIT_liter;
  compartment BoneInt in Bone = 8.4*BoneVas; BoneInt has MWBUILTINUNIT_liter;
  compartment TumorRest = R0_Kidney/Rden_Kidney; TumorRest has MWBUILTINUNIT_liter;
  compartment TumorRestVas in TumorRest = 0.05*(1 - hematocrit)*TumorRest; TumorRestVas has MWBUILTINUNIT_liter;
  compartment TumorRestInt in TumorRest = 0.38*TumorRest; TumorRestInt has MWBUILTINUNIT_liter;
  compartment TumorRestBound in TumorRest = 1 MWBUILTINUNIT_liter;
  compartment TumorRestIntern in TumorRest = 1 MWBUILTINUNIT_liter;
  compartment Spleen = 0.183 MWBUILTINUNIT_liter;
  compartment SpleenVas in Spleen = 0.12*Spleen; SpleenVas has MWBUILTINUNIT_liter;
  compartment SpleenInt in Spleen = 0.2*Spleen; SpleenInt has MWBUILTINUNIT_liter;
  compartment SpleenBound in Spleen = 1 MWBUILTINUNIT_liter;
  compartment SpleenIntern in Spleen = 1 MWBUILTINUNIT_liter;
  compartment Liver = 1.91 MWBUILTINUNIT_liter;
  compartment LiverVas in Liver = 0.085*Liver; LiverVas has MWBUILTINUNIT_liter;
  compartment LiverInt in Liver = 0.2*Liver; LiverInt has MWBUILTINUNIT_liter;
  compartment LiverBound in Liver = 1 MWBUILTINUNIT_liter;
  compartment LiverIntern in Liver = 1 MWBUILTINUNIT_liter;
  compartment Prostate = 0.016*bodyWeight/71*dLiterKg; Prostate has MWBUILTINUNIT_liter;
  compartment ProstateVas in Prostate = 0.004*(1 - hematocrit)*Prostate; ProstateVas has MWBUILTINUNIT_liter;
  compartment ProstateInt in Prostate = 0.25*Prostate; ProstateInt has MWBUILTINUNIT_liter;
  compartment ProstateBound in Prostate = 1 MWBUILTINUNIT_liter;
  compartment ProstateIntern in Prostate = 1 MWBUILTINUNIT_liter;
  compartment GI = (0.385 + 0.548 + 0.104 + 0.15)*bodyWeight/71*dLiterKg; GI has MWBUILTINUNIT_liter;
  compartment GIVas in GI = 0.076*V_p; GIVas has MWBUILTINUNIT_liter;
  compartment GIInt in GI = 8.8*GIVas; GIInt has MWBUILTINUNIT_liter;
  compartment GIBound in GI = 1 MWBUILTINUNIT_liter;
  compartment GIIntern in GI = 1 MWBUILTINUNIT_liter;
  compartment Rest = bodyWeight*dLiterKg - (Lungs + Brain + Heart + Bone + RedMarrow + Adipose + Skin + GI + Muscle + Liver + Kidney + Spleen + Prostate + SG); Rest has MWBUILTINUNIT_liter;
  compartment RestVas in Rest = V_p - (LungsVas + BrainVas + HeartVas + BoneVas + RedMarrowVas + AdiposeVas + SkinVas + GIVas + MuscleVas + LiverVas + KidneyVas + SpleenVas + ProstateVas + SGVas); RestVas has MWBUILTINUNIT_liter;
  compartment RestInt in Rest = 4.1*RestVas; RestInt has MWBUILTINUNIT_liter;
  compartment Skin = 3.408*bodyWeight/71*dLiterKg; Skin has MWBUILTINUNIT_liter;
  compartment SkinVas in Skin = 0.03*V_p; SkinVas has MWBUILTINUNIT_liter;
  compartment SkinInt in Skin = 8.9*SkinVas; SkinInt has MWBUILTINUNIT_liter;
  compartment Muscle = 30.078*bodyWeight/71*dLiterKg; Muscle has MWBUILTINUNIT_liter;
  compartment MuscleVas in Muscle = 0.14*V_p; MuscleVas has MWBUILTINUNIT_liter;
  compartment MuscleInt in Muscle = 5.9*MuscleVas; MuscleInt has MWBUILTINUNIT_liter;
  compartment Brain = 1.45*bodyWeight/71*dLiterKg; Brain has MWBUILTINUNIT_liter;
  compartment BrainVas in Brain = 0.012*V_p; BrainVas has MWBUILTINUNIT_liter;
  compartment BrainInt in Brain = 1*dLiter; BrainInt has MWBUILTINUNIT_liter;
  compartment RedMarrow = 1.1*bodyWeight/71*dLiterKg; RedMarrow has MWBUILTINUNIT_liter;
  compartment RedMarrowVas in RedMarrow = 0.04*V_p; RedMarrowVas has MWBUILTINUNIT_liter;
  compartment RedMarrowInt in RedMarrow = 3.7*RedMarrowVas; RedMarrowInt has MWBUILTINUNIT_liter;
  compartment Lungs = 1*bodyWeight/71*dLiterKg; Lungs has MWBUILTINUNIT_liter;
  compartment LungsVas in Lungs = 0.105*V_p; LungsVas has MWBUILTINUNIT_liter;
  compartment LungsInt in Lungs = 5.5*LungsVas; LungsInt has MWBUILTINUNIT_liter;
  compartment Adipose = 13.465*bodyWeight/71*dLiterKg; Adipose has MWBUILTINUNIT_liter;
  compartment AdiposeVas in Adipose = 0.05*V_p; AdiposeVas has MWBUILTINUNIT_liter;
  compartment AdiposeInt in Adipose = 15.5*AdiposeVas; AdiposeInt has MWBUILTINUNIT_liter;
  compartment KidneyIntera in Kidney = (Kidney - KidneyInt - KidneyVas)*2/3; KidneyIntera has MWBUILTINUNIT_liter;
  compartment Data = 1 MWBUILTINUNIT_liter;

  // Species:
  substanceOnly species Hot_Tumor2Vas in Tumor2Vas = 0;  // substance in MWBUILTINPREFIX_nano_MWBUILTINUNIT_mole
  substanceOnly species Cold_Tumor2Vas in Tumor2Vas = 0;  // substance in MWBUILTINPREFIX_nano_MWBUILTINUNIT_mole
  substanceOnly species AlbHot_Tumor2Vas in Tumor2Vas = 0;  // substance in MWBUILTINPREFIX_nano_MWBUILTINUNIT_mole
  substanceOnly species AlbCold_Tumor2Vas in Tumor2Vas = 0;  // substance in MWBUILTINPREFIX_nano_MWBUILTINUNIT_mole
  substanceOnly species Albumin_Tumor2Vas in Tumor2Vas = AlbuminDen*Tumor2Vas;  // substance in MWBUILTINPREFIX_nano_MWBUILTINUNIT_mole
  substanceOnly species R_Tumor2 in Tumor2;  // substance in MWBUILTINPREFIX_nano_MWBUILTINUNIT_mole
  substanceOnly species Hot_Tumor2Int in Tumor2Int = 0;  // substance in MWBUILTINPREFIX_nano_MWBUILTINUNIT_mole
  substanceOnly species Cold_Tumor2Int in Tumor2Int = 0;  // substance in MWBUILTINPREFIX_nano_MWBUILTINUNIT_mole
  substanceOnly species AlbHot_Tumor2Int in Tumor2Int = 0;  // substance in MWBUILTINPREFIX_nano_MWBUILTINUNIT_mole
  substanceOnly species AlbCold_Tumor2Int in Tumor2Int = 0;  // substance in MWBUILTINPREFIX_nano_MWBUILTINUNIT_mole
  substanceOnly species Albumin_Tumor2Int in Tumor2Int = AlbuminDen*Tumor2Int;  // substance in MWBUILTINPREFIX_nano_MWBUILTINUNIT_mole
  substanceOnly species Hot_Tumor2Bound in Tumor2Bound = 0;  // substance in MWBUILTINPREFIX_nano_MWBUILTINUNIT_mole
  substanceOnly species Cold_Tumor2Bound in Tumor2Bound = 0;  // substance in MWBUILTINPREFIX_nano_MWBUILTINUNIT_mole
  substanceOnly species Hot_Tumor2Intern in Tumor2Intern = 0;  // substance in MWBUILTINPREFIX_nano_MWBUILTINUNIT_mole
  substanceOnly species Cold_Tumor2Intern in Tumor2Intern = 0;  // substance in MWBUILTINPREFIX_nano_MWBUILTINUNIT_mole
  substanceOnly species Hot_Art in Art = 0;  // substance in MWBUILTINPREFIX_nano_MWBUILTINUNIT_mole
  substanceOnly species Cold_Art in Art = 0;  // substance in MWBUILTINPREFIX_nano_MWBUILTINUNIT_mole
  substanceOnly species AlbHot_Art in Art = 0;  // substance in MWBUILTINPREFIX_nano_MWBUILTINUNIT_mole
  substanceOnly species AlbCold_Art in Art = 0;  // substance in MWBUILTINPREFIX_nano_MWBUILTINUNIT_mole
  substanceOnly species Albumin_Art in Art = AlbuminDen*Art;  // substance in MWBUILTINPREFIX_nano_MWBUILTINUNIT_mole
  substanceOnly species Hot_Vein in Vein = 0;  // substance in MWBUILTINPREFIX_nano_MWBUILTINUNIT_mole
  substanceOnly species Cold_Vein in Vein = 0;  // substance in MWBUILTINPREFIX_nano_MWBUILTINUNIT_mole
  substanceOnly species AlbHot_Vein in Vein = 0;  // substance in MWBUILTINPREFIX_nano_MWBUILTINUNIT_mole
  substanceOnly species AlbCold_Vein in Vein = 0;  // substance in MWBUILTINPREFIX_nano_MWBUILTINUNIT_mole
  substanceOnly species Albumin_Vein in Vein = AlbuminDen*Vein;  // substance in MWBUILTINPREFIX_nano_MWBUILTINUNIT_mole
  substanceOnly species R_Tumor1 in Tumor1;  // substance in MWBUILTINPREFIX_nano_MWBUILTINUNIT_mole
  substanceOnly species Hot_Tumor1Vas in Tumor1Vas = 0;  // substance in MWBUILTINPREFIX_nano_MWBUILTINUNIT_mole
  substanceOnly species Cold_Tumor1Vas in Tumor1Vas = 0;  // substance in MWBUILTINPREFIX_nano_MWBUILTINUNIT_mole
  substanceOnly species AlbHot_Tumor1Vas in Tumor1Vas = 0;  // substance in MWBUILTINPREFIX_nano_MWBUILTINUNIT_mole
  substanceOnly species AlbCold_Tumor1Vas in Tumor1Vas = 0;  // substance in MWBUILTINPREFIX_nano_MWBUILTINUNIT_mole
  substanceOnly species Albumin_Tumor1Vas in Tumor1Vas = AlbuminDen*Tumor1Vas;  // substance in MWBUILTINPREFIX_nano_MWBUILTINUNIT_mole
  substanceOnly species Hot_Tumor1Int in Tumor1Int = 0;  // substance in MWBUILTINPREFIX_nano_MWBUILTINUNIT_mole
  substanceOnly species Cold_Tumor1Int in Tumor1Int = 0;  // substance in MWBUILTINPREFIX_nano_MWBUILTINUNIT_mole
  substanceOnly species AlbHot_Tumor1Int in Tumor1Int = 0;  // substance in MWBUILTINPREFIX_nano_MWBUILTINUNIT_mole
  substanceOnly species AlbCold_Tumor1Int in Tumor1Int = 0;  // substance in MWBUILTINPREFIX_nano_MWBUILTINUNIT_mole
  substanceOnly species Albumin_Tumor1Int in Tumor1Int = AlbuminDen*Tumor1Int;  // substance in MWBUILTINPREFIX_nano_MWBUILTINUNIT_mole
  substanceOnly species Hot_Tumor1Bound in Tumor1Bound = 0;  // substance in MWBUILTINPREFIX_nano_MWBUILTINUNIT_mole
  substanceOnly species Cold_Tumor1Bound in Tumor1Bound = 0;  // substance in MWBUILTINPREFIX_nano_MWBUILTINUNIT_mole
  substanceOnly species Hot_Tumor1Intern in Tumor1Intern = 0;  // substance in MWBUILTINPREFIX_nano_MWBUILTINUNIT_mole
  substanceOnly species Cold_Tumor1Intern in Tumor1Intern = 0;  // substance in MWBUILTINPREFIX_nano_MWBUILTINUNIT_mole
  substanceOnly species R_Kidney in Kidney;  // substance in MWBUILTINPREFIX_nano_MWBUILTINUNIT_mole
  substanceOnly species Hot_KidneyVas in KidneyVas = 0;  // substance in MWBUILTINPREFIX_nano_MWBUILTINUNIT_mole
  substanceOnly species Cold_KidneyVas in KidneyVas = 0;  // substance in MWBUILTINPREFIX_nano_MWBUILTINUNIT_mole
  substanceOnly species AlbHot_KidneyVas in KidneyVas = 0;  // substance in MWBUILTINPREFIX_nano_MWBUILTINUNIT_mole
  substanceOnly species AlbCold_KidneyVas in KidneyVas = 0;  // substance in MWBUILTINPREFIX_nano_MWBUILTINUNIT_mole
  substanceOnly species Albumin_KidneyVas in KidneyVas = AlbuminDen*KidneyVas;  // substance in MWBUILTINPREFIX_nano_MWBUILTINUNIT_mole
  substanceOnly species Hot_KidneyInt in KidneyInt = 0;  // substance in MWBUILTINPREFIX_nano_MWBUILTINUNIT_mole
  substanceOnly species Cold_KidneyInt in KidneyInt = 0;  // substance in MWBUILTINPREFIX_nano_MWBUILTINUNIT_mole
  substanceOnly species Hot_KidneyBound in KidneyBound = 0;  // substance in MWBUILTINPREFIX_nano_MWBUILTINUNIT_mole
  substanceOnly species Cold_KidneyBound in KidneyBound = 0;  // substance in MWBUILTINPREFIX_nano_MWBUILTINUNIT_mole
  substanceOnly species Hot_KidneyIntern in KidneyIntern = 0;  // substance in MWBUILTINPREFIX_nano_MWBUILTINUNIT_mole
  substanceOnly species Cold_KidneyIntern in KidneyIntern = 0;  // substance in MWBUILTINPREFIX_nano_MWBUILTINUNIT_mole
  substanceOnly species Hot_HeartVas in HeartVas = 0;  // substance in MWBUILTINPREFIX_nano_MWBUILTINUNIT_mole
  substanceOnly species Cold_HeartVas in HeartVas = 0;  // substance in MWBUILTINPREFIX_nano_MWBUILTINUNIT_mole
  substanceOnly species AlbHot_HeartVas in HeartVas = 0;  // substance in MWBUILTINPREFIX_nano_MWBUILTINUNIT_mole
  substanceOnly species AlbCold_HeartVas in HeartVas = 0;  // substance in MWBUILTINPREFIX_nano_MWBUILTINUNIT_mole
  substanceOnly species Albumin_HeartVas in HeartVas = AlbuminDen*HeartVas;  // substance in MWBUILTINPREFIX_nano_MWBUILTINUNIT_mole
  substanceOnly species Hot_HeartInt in HeartInt = 0;  // substance in MWBUILTINPREFIX_nano_MWBUILTINUNIT_mole
  substanceOnly species Cold_HeartInt in HeartInt = 0;  // substance in MWBUILTINPREFIX_nano_MWBUILTINUNIT_mole
  substanceOnly species R_SG in SG;  // substance in MWBUILTINPREFIX_nano_MWBUILTINUNIT_mole
  substanceOnly species Hot_SGVas in SGVas = 0;  // substance in MWBUILTINPREFIX_nano_MWBUILTINUNIT_mole
  substanceOnly species Cold_SGVas in SGVas = 0;  // substance in MWBUILTINPREFIX_nano_MWBUILTINUNIT_mole
  substanceOnly species AlbHot_SGVas in SGVas = 0;  // substance in MWBUILTINPREFIX_nano_MWBUILTINUNIT_mole
  substanceOnly species AlbCold_SGVas in SGVas = 0;  // substance in MWBUILTINPREFIX_nano_MWBUILTINUNIT_mole
  substanceOnly species Albumin_SGVas in SGVas = AlbuminDen*SGVas;  // substance in MWBUILTINPREFIX_nano_MWBUILTINUNIT_mole
  substanceOnly species Hot_SGInt in SGInt = 0;  // substance in MWBUILTINPREFIX_nano_MWBUILTINUNIT_mole
  substanceOnly species Cold_SGInt in SGInt = 0;  // substance in MWBUILTINPREFIX_nano_MWBUILTINUNIT_mole
  substanceOnly species Hot_SGBound in SGBound = 0;  // substance in MWBUILTINPREFIX_nano_MWBUILTINUNIT_mole
  substanceOnly species Cold_SGBound in SGBound = 0;  // substance in MWBUILTINPREFIX_nano_MWBUILTINUNIT_mole
  substanceOnly species Hot_SGIntern in SGIntern = 0;  // substance in MWBUILTINPREFIX_nano_MWBUILTINUNIT_mole
  substanceOnly species Cold_SGIntern in SGIntern = 0;  // substance in MWBUILTINPREFIX_nano_MWBUILTINUNIT_mole
  substanceOnly species Hot_BoneVas in BoneVas = 0;  // substance in MWBUILTINPREFIX_nano_MWBUILTINUNIT_mole
  substanceOnly species Cold_BoneVas in BoneVas = 0;  // substance in MWBUILTINPREFIX_nano_MWBUILTINUNIT_mole
  substanceOnly species AlbHot_BoneVas in BoneVas = 0;  // substance in MWBUILTINPREFIX_nano_MWBUILTINUNIT_mole
  substanceOnly species AlbCold_BoneVas in BoneVas = 0;  // substance in MWBUILTINPREFIX_nano_MWBUILTINUNIT_mole
  substanceOnly species Albumin_BoneVas in BoneVas = AlbuminDen*BoneVas;  // substance in MWBUILTINPREFIX_nano_MWBUILTINUNIT_mole
  substanceOnly species Hot_BoneInt in BoneInt = 0;  // substance in MWBUILTINPREFIX_nano_MWBUILTINUNIT_mole
  substanceOnly species Cold_BoneInt in BoneInt = 0;  // substance in MWBUILTINPREFIX_nano_MWBUILTINUNIT_mole
  substanceOnly species R_TumorRest in TumorRest;  // substance in MWBUILTINPREFIX_nano_MWBUILTINUNIT_mole
  substanceOnly species Hot_TumorRestVas in TumorRestVas = 0;  // substance in MWBUILTINPREFIX_nano_MWBUILTINUNIT_mole
  substanceOnly species Cold_TumorRestVas in TumorRestVas = 0;  // substance in MWBUILTINPREFIX_nano_MWBUILTINUNIT_mole
  substanceOnly species AlbHot_TumorRestVas in TumorRestVas = 0;  // substance in MWBUILTINPREFIX_nano_MWBUILTINUNIT_mole
  substanceOnly species AlbCold_TumorRestVas in TumorRestVas = 0;  // substance in MWBUILTINPREFIX_nano_MWBUILTINUNIT_mole
  substanceOnly species Albumin_TumorRestVas in TumorRestVas = AlbuminDen*TumorRestVas;  // substance in MWBUILTINPREFIX_nano_MWBUILTINUNIT_mole
  substanceOnly species Hot_TumorRestInt in TumorRestInt = 0;  // substance in MWBUILTINPREFIX_nano_MWBUILTINUNIT_mole
  substanceOnly species Cold_TumorRestInt in TumorRestInt = 0;  // substance in MWBUILTINPREFIX_nano_MWBUILTINUNIT_mole
  substanceOnly species AlbHot_TumorRestInt in TumorRestInt = 0;  // substance in MWBUILTINPREFIX_nano_MWBUILTINUNIT_mole
  substanceOnly species AlbCold_TumorRestInt in TumorRestInt = 0;  // substance in MWBUILTINPREFIX_nano_MWBUILTINUNIT_mole
  substanceOnly species Albumin_TumorRestInt in TumorRestInt = AlbuminDen*TumorRestInt;  // substance in MWBUILTINPREFIX_nano_MWBUILTINUNIT_mole
  substanceOnly species Hot_TumorRestBound in TumorRestBound = 0;  // substance in MWBUILTINPREFIX_nano_MWBUILTINUNIT_mole
  substanceOnly species Cold_TumorRestBound in TumorRestBound = 0;  // substance in MWBUILTINPREFIX_nano_MWBUILTINUNIT_mole
  substanceOnly species Hot_TumorRestIntern in TumorRestIntern = 0;  // substance in MWBUILTINPREFIX_nano_MWBUILTINUNIT_mole
  substanceOnly species Cold_TumorRestIntern in TumorRestIntern = 0;  // substance in MWBUILTINPREFIX_nano_MWBUILTINUNIT_mole
  substanceOnly species R_Spleen in Spleen;  // substance in MWBUILTINPREFIX_nano_MWBUILTINUNIT_mole
  substanceOnly species Hot_SpleenVas in SpleenVas = 0;  // substance in MWBUILTINPREFIX_nano_MWBUILTINUNIT_mole
  substanceOnly species Cold_SpleenVas in SpleenVas = 0;  // substance in MWBUILTINPREFIX_nano_MWBUILTINUNIT_mole
  substanceOnly species AlbHot_SpleenVas in SpleenVas = 0;  // substance in MWBUILTINPREFIX_nano_MWBUILTINUNIT_mole
  substanceOnly species AlbCold_SpleenVas in SpleenVas = 0;  // substance in MWBUILTINPREFIX_nano_MWBUILTINUNIT_mole
  substanceOnly species Albumin_SpleenVas in SpleenVas = AlbuminDen*SpleenVas;  // substance in MWBUILTINPREFIX_nano_MWBUILTINUNIT_mole
  substanceOnly species Hot_SpleenInt in SpleenInt = 0;  // substance in MWBUILTINPREFIX_nano_MWBUILTINUNIT_mole
  substanceOnly species Cold_SpleenInt in SpleenInt = 0;  // substance in MWBUILTINPREFIX_nano_MWBUILTINUNIT_mole
  substanceOnly species Hot_SpleenBound in SpleenBound = 0;  // substance in MWBUILTINPREFIX_nano_MWBUILTINUNIT_mole
  substanceOnly species Cold_SpleenBound in SpleenBound = 0;  // substance in MWBUILTINPREFIX_nano_MWBUILTINUNIT_mole
  substanceOnly species Hot_SpleenIntern in SpleenIntern = 0;  // substance in MWBUILTINPREFIX_nano_MWBUILTINUNIT_mole
  substanceOnly species Cold_SpleenIntern in SpleenIntern = 0;  // substance in MWBUILTINPREFIX_nano_MWBUILTINUNIT_mole
  substanceOnly species R_Liver in Liver;  // substance in MWBUILTINPREFIX_nano_MWBUILTINUNIT_mole
  substanceOnly species Hot_LiverVas in LiverVas = 0;  // substance in MWBUILTINPREFIX_nano_MWBUILTINUNIT_mole
  substanceOnly species Cold_LiverVas in LiverVas = 0;  // substance in MWBUILTINPREFIX_nano_MWBUILTINUNIT_mole
  substanceOnly species AlbHot_LiverVas in LiverVas = 0;  // substance in MWBUILTINPREFIX_nano_MWBUILTINUNIT_mole
  substanceOnly species AlbCold_LiverVas in LiverVas = 0;  // substance in MWBUILTINPREFIX_nano_MWBUILTINUNIT_mole
  substanceOnly species Albumin_LiverVas in LiverVas = AlbuminDen*LiverVas;  // substance in MWBUILTINPREFIX_nano_MWBUILTINUNIT_mole
  substanceOnly species Hot_LiverInt in LiverInt = 0;  // substance in MWBUILTINPREFIX_nano_MWBUILTINUNIT_mole
  substanceOnly species Cold_LiverInt in LiverInt = 0;  // substance in MWBUILTINPREFIX_nano_MWBUILTINUNIT_mole
  substanceOnly species Hot_LiverBound in LiverBound = 0;  // substance in MWBUILTINPREFIX_nano_MWBUILTINUNIT_mole
  substanceOnly species Cold_LiverBound in LiverBound = 0;  // substance in MWBUILTINPREFIX_nano_MWBUILTINUNIT_mole
  substanceOnly species Hot_LiverIntern in LiverIntern = 0;  // substance in MWBUILTINPREFIX_nano_MWBUILTINUNIT_mole
  substanceOnly species Cold_LiverIntern in LiverIntern = 0;  // substance in MWBUILTINPREFIX_nano_MWBUILTINUNIT_mole
  substanceOnly species R_Prostate in Prostate;  // substance in MWBUILTINPREFIX_nano_MWBUILTINUNIT_mole
  substanceOnly species Hot_ProstateVas in ProstateVas = 0;  // substance in MWBUILTINPREFIX_nano_MWBUILTINUNIT_mole
  substanceOnly species Cold_ProstateVas in ProstateVas = 0;  // substance in MWBUILTINPREFIX_nano_MWBUILTINUNIT_mole
  substanceOnly species AlbHot_ProstateVas in ProstateVas = 0;  // substance in MWBUILTINPREFIX_nano_MWBUILTINUNIT_mole
  substanceOnly species AlbCold_ProstateVas in ProstateVas = 0;  // substance in MWBUILTINPREFIX_nano_MWBUILTINUNIT_mole
  substanceOnly species Albumin_ProstateVas in ProstateVas = AlbuminDen*ProstateVas;  // substance in MWBUILTINPREFIX_nano_MWBUILTINUNIT_mole
  substanceOnly species Hot_ProstateInt in ProstateInt = 0;  // substance in MWBUILTINPREFIX_nano_MWBUILTINUNIT_mole
  substanceOnly species Cold_ProstateInt in ProstateInt = 0;  // substance in MWBUILTINPREFIX_nano_MWBUILTINUNIT_mole
  substanceOnly species Hot_ProstateBound in ProstateBound = 0;  // substance in MWBUILTINPREFIX_nano_MWBUILTINUNIT_mole
  substanceOnly species Cold_ProstateBound in ProstateBound = 0;  // substance in MWBUILTINPREFIX_nano_MWBUILTINUNIT_mole
  substanceOnly species Hot_ProstateIntern in ProstateIntern = 0;  // substance in MWBUILTINPREFIX_nano_MWBUILTINUNIT_mole
  substanceOnly species Cold_ProstateIntern in ProstateIntern = 0;  // substance in MWBUILTINPREFIX_nano_MWBUILTINUNIT_mole
  substanceOnly species R_GI in GI;  // substance in MWBUILTINPREFIX_nano_MWBUILTINUNIT_mole
  substanceOnly species Hot_GIVas in GIVas = 0;  // substance in MWBUILTINPREFIX_nano_MWBUILTINUNIT_mole
  substanceOnly species Cold_GIVas in GIVas = 0;  // substance in MWBUILTINPREFIX_nano_MWBUILTINUNIT_mole
  substanceOnly species AlbHot_GIVas in GIVas = 0;  // substance in MWBUILTINPREFIX_nano_MWBUILTINUNIT_mole
  substanceOnly species AlbCold_GIVas in GIVas = 0;  // substance in MWBUILTINPREFIX_nano_MWBUILTINUNIT_mole
  substanceOnly species Albumin_GIVas in GIVas = AlbuminDen*GIVas;  // substance in MWBUILTINPREFIX_nano_MWBUILTINUNIT_mole
  substanceOnly species Hot_GIInt in GIInt = 0;  // substance in MWBUILTINPREFIX_nano_MWBUILTINUNIT_mole
  substanceOnly species Cold_GIInt in GIInt = 0;  // substance in MWBUILTINPREFIX_nano_MWBUILTINUNIT_mole
  substanceOnly species Hot_GIBound in GIBound = 0;  // substance in MWBUILTINPREFIX_nano_MWBUILTINUNIT_mole
  substanceOnly species Cold_GIBound in GIBound = 0;  // substance in MWBUILTINPREFIX_nano_MWBUILTINUNIT_mole
  substanceOnly species Hot_GIIntern in GIIntern = 0;  // substance in MWBUILTINPREFIX_nano_MWBUILTINUNIT_mole
  substanceOnly species Cold_GIIntern in GIIntern = 0;  // substance in MWBUILTINPREFIX_nano_MWBUILTINUNIT_mole
  substanceOnly species Hot_RestVas in RestVas = 0;  // substance in MWBUILTINPREFIX_nano_MWBUILTINUNIT_mole
  substanceOnly species Cold_RestVas in RestVas = 0;  // substance in MWBUILTINPREFIX_nano_MWBUILTINUNIT_mole
  substanceOnly species AlbHot_RestVas in RestVas = 0;  // substance in MWBUILTINPREFIX_nano_MWBUILTINUNIT_mole
  substanceOnly species AlbCold_RestVas in RestVas = 0;  // substance in MWBUILTINPREFIX_nano_MWBUILTINUNIT_mole
  substanceOnly species Albumin_RestVas in RestVas = AlbuminDen*RestVas;  // substance in MWBUILTINPREFIX_nano_MWBUILTINUNIT_mole
  substanceOnly species Hot_RestInt in RestInt = 0;  // substance in MWBUILTINPREFIX_nano_MWBUILTINUNIT_mole
  substanceOnly species Cold_RestInt in RestInt = 0;  // substance in MWBUILTINPREFIX_nano_MWBUILTINUNIT_mole
  substanceOnly species Hot_SkinVas in SkinVas = 0;  // substance in MWBUILTINPREFIX_nano_MWBUILTINUNIT_mole
  substanceOnly species Cold_SkinVas in SkinVas = 0;  // substance in MWBUILTINPREFIX_nano_MWBUILTINUNIT_mole
  substanceOnly species AlbHot_SkinVas in SkinVas = 0;  // substance in MWBUILTINPREFIX_nano_MWBUILTINUNIT_mole
  substanceOnly species AlbCold_SkinVas in SkinVas = 0;  // substance in MWBUILTINPREFIX_nano_MWBUILTINUNIT_mole
  substanceOnly species Albumin_SkinVas in SkinVas = AlbuminDen*SkinVas;  // substance in MWBUILTINPREFIX_nano_MWBUILTINUNIT_mole
  substanceOnly species Hot_SkinInt in SkinInt = 0;  // substance in MWBUILTINPREFIX_nano_MWBUILTINUNIT_mole
  substanceOnly species Cold_SkinInt in SkinInt = 0;  // substance in MWBUILTINPREFIX_nano_MWBUILTINUNIT_mole
  substanceOnly species Hot_MuscleVas in MuscleVas = 0;  // substance in MWBUILTINPREFIX_nano_MWBUILTINUNIT_mole
  substanceOnly species Cold_MuscleVas in MuscleVas = 0;  // substance in MWBUILTINPREFIX_nano_MWBUILTINUNIT_mole
  substanceOnly species AlbHot_MuscleVas in MuscleVas = 0;  // substance in MWBUILTINPREFIX_nano_MWBUILTINUNIT_mole
  substanceOnly species AlbCold_MuscleVas in MuscleVas = 0;  // substance in MWBUILTINPREFIX_nano_MWBUILTINUNIT_mole
  substanceOnly species Albumin_MuscleVas in MuscleVas = AlbuminDen*MuscleVas;  // substance in MWBUILTINPREFIX_nano_MWBUILTINUNIT_mole
  substanceOnly species Hot_MuscleInt in MuscleInt = 0;  // substance in MWBUILTINPREFIX_nano_MWBUILTINUNIT_mole
  substanceOnly species Cold_MuscleInt in MuscleInt = 0;  // substance in MWBUILTINPREFIX_nano_MWBUILTINUNIT_mole
  substanceOnly species Hot_BrainVas in BrainVas = 0;  // substance in MWBUILTINPREFIX_nano_MWBUILTINUNIT_mole
  substanceOnly species Cold_BrainVas in BrainVas = 0;  // substance in MWBUILTINPREFIX_nano_MWBUILTINUNIT_mole
  substanceOnly species AlbHot_BrainVas in BrainVas = 0;  // substance in MWBUILTINPREFIX_nano_MWBUILTINUNIT_mole
  substanceOnly species AlbCold_BrainVas in BrainVas = 0;  // substance in MWBUILTINPREFIX_nano_MWBUILTINUNIT_mole
  substanceOnly species Albumin_BrainVas in BrainVas = AlbuminDen*BrainVas;  // substance in MWBUILTINPREFIX_nano_MWBUILTINUNIT_mole
  substanceOnly species Hot_BrainInt in BrainInt = 0;  // substance in MWBUILTINPREFIX_nano_MWBUILTINUNIT_mole
  substanceOnly species Cold_BrainInt in BrainInt = 0;  // substance in MWBUILTINPREFIX_nano_MWBUILTINUNIT_mole
  substanceOnly species Hot_RedMarrowVas in RedMarrowVas = 0;  // substance in MWBUILTINPREFIX_nano_MWBUILTINUNIT_mole
  substanceOnly species Cold_RedMarrowVas in RedMarrowVas = 0;  // substance in MWBUILTINPREFIX_nano_MWBUILTINUNIT_mole
  substanceOnly species AlbHot_RedMarrowVas in RedMarrowVas = 0;  // substance in MWBUILTINPREFIX_nano_MWBUILTINUNIT_mole
  substanceOnly species AlbCold_RedMarrowVas in RedMarrowVas = 0;  // substance in MWBUILTINPREFIX_nano_MWBUILTINUNIT_mole
  substanceOnly species Albumin_RedMarrowVas in RedMarrowVas = AlbuminDen*RedMarrowVas;  // substance in MWBUILTINPREFIX_nano_MWBUILTINUNIT_mole
  substanceOnly species Hot_RedMarrowInt in RedMarrowInt = 0;  // substance in MWBUILTINPREFIX_nano_MWBUILTINUNIT_mole
  substanceOnly species Cold_RedMarrowInt in RedMarrowInt = 0;  // substance in MWBUILTINPREFIX_nano_MWBUILTINUNIT_mole
  substanceOnly species Hot_LungsVas in LungsVas = 0;  // substance in MWBUILTINPREFIX_nano_MWBUILTINUNIT_mole
  substanceOnly species Cold_LungsVas in LungsVas = 0;  // substance in MWBUILTINPREFIX_nano_MWBUILTINUNIT_mole
  substanceOnly species AlbHot_LungsVas in LungsVas = 0;  // substance in MWBUILTINPREFIX_nano_MWBUILTINUNIT_mole
  substanceOnly species AlbCold_LungsVas in LungsVas = 0;  // substance in MWBUILTINPREFIX_nano_MWBUILTINUNIT_mole
  substanceOnly species Albumin_LungsVas in LungsVas = AlbuminDen*LungsVas;  // substance in MWBUILTINPREFIX_nano_MWBUILTINUNIT_mole
  substanceOnly species Hot_LungsInt in LungsInt = 0;  // substance in MWBUILTINPREFIX_nano_MWBUILTINUNIT_mole
  substanceOnly species Cold_LungsInt in LungsInt = 0;  // substance in MWBUILTINPREFIX_nano_MWBUILTINUNIT_mole
  substanceOnly species Hot_AdiposeVas in AdiposeVas = 0;  // substance in MWBUILTINPREFIX_nano_MWBUILTINUNIT_mole
  substanceOnly species Cold_AdiposeVas in AdiposeVas = 0;  // substance in MWBUILTINPREFIX_nano_MWBUILTINUNIT_mole
  substanceOnly species AlbHot_AdiposeVas in AdiposeVas = 0;  // substance in MWBUILTINPREFIX_nano_MWBUILTINUNIT_mole
  substanceOnly species AlbCold_AdiposeVas in AdiposeVas = 0;  // substance in MWBUILTINPREFIX_nano_MWBUILTINUNIT_mole
  substanceOnly species Albumin_AdiposeVas in AdiposeVas = AlbuminDen*AdiposeVas;  // substance in MWBUILTINPREFIX_nano_MWBUILTINUNIT_mole
  substanceOnly species Hot_AdiposeInt in AdiposeInt = 0;  // substance in MWBUILTINPREFIX_nano_MWBUILTINUNIT_mole
  substanceOnly species Cold_AdiposeInt in AdiposeInt = 0;  // substance in MWBUILTINPREFIX_nano_MWBUILTINUNIT_mole
  substanceOnly species Hot_KidneyIntera in KidneyIntera = 0;  // substance in MWBUILTINPREFIX_nano_MWBUILTINUNIT_mole
  substanceOnly species Cold_KidneyIntera in KidneyIntera = 0;  // substance in MWBUILTINPREFIX_nano_MWBUILTINUNIT_mole
  substanceOnly species DataTumor1 in Data = 0;  // substance in MWBUILTINPREFIX_nano_MWBUILTINUNIT_mole
  substanceOnly species DataTumor2 in Data = 0;  // substance in MWBUILTINPREFIX_nano_MWBUILTINUNIT_mole
  substanceOnly species DataSG in Data = 0;  // substance in MWBUILTINPREFIX_nano_MWBUILTINUNIT_mole
  substanceOnly species DataKidney in Data;  // substance in MWBUILTINPREFIX_nano_MWBUILTINUNIT_mole

  // Parameters:
  lambdaPhys = 7.15e-5 MWDERIVEDUNIT_1__minute;
  k_on_toAlb = k_off_toAlb/K_D_Alb; k_on_toAlb has MWDERIVEDUNIT_liter__nanomole__minute;
  k_off_toAlb = 1 MWDERIVEDUNIT_1__minute;
  k_on = 0.046 MWDERIVEDUNIT_liter__nanomole__minute;
  k_off = 0.368 MWDERIVEDUNIT_1__minute;
  k_on_AlbPharm = 0 MWDERIVEDUNIT_liter__nanomole__minute;
  k_off_AlbPharm = 0 MWDERIVEDUNIT_1__minute;
  F_Kidney = f_Tumor1*R0_Kidney/Rden_Kidney; F_Kidney has MWDERIVEDUNIT_liter__minute; F_Kidney is "F_Tumor1";
  PSAlb_TumorRest = kPSAlb_TumorRest*TumorRest; PSAlb_TumorRest has MWDERIVEDUNIT_liter__minute; PSAlb_TumorRest is "PSAlb_Tumor1";
  TER_Kidney = kPS_Skin*Skin; TER_Kidney has MWDERIVEDUNIT_liter__minute; TER_Kidney is "PS_Tumor1";
  Rden_Kidney = 0.06*Rden_Kidney; Rden_Kidney has MWDERIVEDUNIT_nanomole__liter; Rden_Kidney is "Rden_Tumor1";
  R0_Kidney = Rden_Kidney*Liver; R0_Kidney has MWBUILTINPREFIX_nano_MWBUILTINUNIT_mole; R0_Kidney is "R0_Tumor1";
  lambdaIntern_Kidney = lambdaIntern_Kidney; lambdaIntern_Kidney has MWDERIVEDUNIT_1__minute; lambdaIntern_Kidney is "lambdaIntern_Tumor1";
  lambdaRel_Kidney = lambdaRel_Normal; lambdaRel_Kidney has MWDERIVEDUNIT_1__minute; lambdaRel_Kidney is "lambdaRel_Tumor1";
  F_Kidney = -1 MWDERIVEDUNIT_liter__minute; F_Kidney is "F_Tumor2";
  PSAlb_TumorRest = -1 MWDERIVEDUNIT_liter__minute; PSAlb_TumorRest is "PSAlb_Tumor2";
  TER_Kidney = -1 MWDERIVEDUNIT_liter__minute; TER_Kidney is "PS_Tumor2";
  Rden_Kidney = -1 MWDERIVEDUNIT_nanomole__liter; Rden_Kidney is "Rden_Tumor2";
  R0_Kidney = -1 MWBUILTINPREFIX_nano_MWBUILTINUNIT_mole; R0_Kidney is "R0_Tumor2";
  lambdaIntern_Kidney = 0.001 MWDERIVEDUNIT_1__minute; lambdaIntern_Kidney is "lambdaIntern_Tumor2";
  lambdaRel_Kidney = -1 MWDERIVEDUNIT_1__minute; lambdaRel_Kidney is "lambdaRel_Tumor2";
  F_Kidney = -1 MWDERIVEDUNIT_liter__minute; F_Kidney is "F_TumorRest";
  PSAlb_TumorRest = -1 MWDERIVEDUNIT_liter__minute;
  TER_Kidney = -1 MWDERIVEDUNIT_liter__minute; TER_Kidney is "PS_TumorRest";
  Rden_Kidney = 266 MWDERIVEDUNIT_nanomole__liter; Rden_Kidney is "Rden_TumorRest";
  R0_Kidney = -1 MWBUILTINPREFIX_nano_MWBUILTINUNIT_mole; R0_Kidney is "R0_TumorRest";
  lambdaIntern_Kidney = 0.001 MWDERIVEDUNIT_1__minute; lambdaIntern_Kidney is "lambdaIntern_TumorRest";
  lambdaRel_Kidney = -1 MWDERIVEDUNIT_1__minute; lambdaRel_Kidney is "lambdaRel_TumorRest";
  F_Kidney = -1 MWDERIVEDUNIT_liter__minute; F_Kidney is "F_SG";
  TER_Kidney = -1 MWDERIVEDUNIT_liter__minute; TER_Kidney is "PS_SG";
  Rden_Kidney = -1 MWDERIVEDUNIT_nanomole__liter; Rden_Kidney is "Rden_SG";
  R0_Kidney = -1 MWBUILTINPREFIX_nano_MWBUILTINUNIT_mole; R0_Kidney is "R0_SG";
  lambdaIntern_Kidney = -1 MWDERIVEDUNIT_1__minute; lambdaIntern_Kidney is "lambdaIntern_SG";
  lambdaRel_Kidney = -1 MWDERIVEDUNIT_1__minute; lambdaRel_Kidney is "lambdaRel_SG";
  F_Kidney = -1 MWDERIVEDUNIT_liter__minute; F_Kidney is "F_Spleen";
  TER_Kidney = -1 MWDERIVEDUNIT_liter__minute; TER_Kidney is "PS_Spleen";
  Rden_Kidney = -1 MWDERIVEDUNIT_nanomole__liter; Rden_Kidney is "Rden_Spleen";
  R0_Kidney = -1 MWBUILTINPREFIX_nano_MWBUILTINUNIT_mole; R0_Kidney is "R0_Spleen";
  lambdaIntern_Kidney = -1 MWDERIVEDUNIT_1__minute; lambdaIntern_Kidney is "lambdaIntern_Spleen";
  lambdaRel_Kidney = -1 MWDERIVEDUNIT_1__minute; lambdaRel_Kidney is "lambdaRel_Spleen";
  F_Kidney = -1 MWDERIVEDUNIT_liter__minute; F_Kidney is "F_Prostate";
  TER_Kidney = -1 MWDERIVEDUNIT_liter__minute; TER_Kidney is "PS_Prostate";
  Rden_Kidney = -1 MWDERIVEDUNIT_nanomole__liter; Rden_Kidney is "Rden_Prostate";
  R0_Kidney = -1 MWBUILTINPREFIX_nano_MWBUILTINUNIT_mole; R0_Kidney is "R0_Prostate";
  lambdaIntern_Kidney = -1 MWDERIVEDUNIT_1__minute; lambdaIntern_Kidney is "lambdaIntern_Prostate";
  lambdaRel_Kidney = -1 MWDERIVEDUNIT_1__minute; lambdaRel_Kidney is "lambdaRel_Prostate";
  F_Kidney = -1 MWDERIVEDUNIT_liter__minute; F_Kidney is "F_Liver";
  TER_Kidney = -1 MWDERIVEDUNIT_liter__minute; TER_Kidney is "PS_Liver";
  Rden_Kidney = -1 MWDERIVEDUNIT_nanomole__liter; Rden_Kidney is "Rden_Liver";
  R0_Kidney = -1 MWBUILTINPREFIX_nano_MWBUILTINUNIT_mole; R0_Kidney is "R0_Liver";
  lambdaIntern_Kidney = -1 MWDERIVEDUNIT_1__minute; lambdaIntern_Kidney is "lambdaIntern_Liver";
  lambdaRel_Kidney = -1 MWDERIVEDUNIT_1__minute; lambdaRel_Kidney is "lambdaRel_Liver";
  F_Kidney = -1 MWDERIVEDUNIT_liter__minute; F_Kidney is "F_GI";
  TER_Kidney = -1 MWDERIVEDUNIT_liter__minute; TER_Kidney is "PS_GI";
  Rden_Kidney = -1 MWDERIVEDUNIT_nanomole__liter; Rden_Kidney is "Rden_GI";
  R0_Kidney = -1 MWBUILTINPREFIX_nano_MWBUILTINUNIT_mole; R0_Kidney is "R0_GI";
  lambdaIntern_Kidney = -1 MWDERIVEDUNIT_1__minute; lambdaIntern_Kidney is "lambdaIntern_GI";
  lambdaRel_Kidney = -1 MWDERIVEDUNIT_1__minute; lambdaRel_Kidney is "lambdaRel_GI";
  F_Kidney = -1 MWDERIVEDUNIT_liter__minute; F_Kidney is "F_Rest";
  TER_Kidney = -1 MWDERIVEDUNIT_liter__minute; TER_Kidney is "PS_Rest";
  F_Kidney = -1 MWDERIVEDUNIT_liter__minute; F_Kidney is "F_Muscle";
  TER_Kidney = -1 MWDERIVEDUNIT_liter__minute; TER_Kidney is "PS_Muscle";
  F_Kidney = -1 MWDERIVEDUNIT_liter__minute; F_Kidney is "F_Skin";
  TER_Kidney = -1 MWDERIVEDUNIT_liter__minute; TER_Kidney is "PS_Skin";
  F_Kidney = -1 MWDERIVEDUNIT_liter__minute; F_Kidney is "F_RedMarrow";
  TER_Kidney = -1 MWDERIVEDUNIT_liter__minute; TER_Kidney is "PS_RedMarrow";
  F_Kidney = -1 MWDERIVEDUNIT_liter__minute; F_Kidney is "F_Brain";
  TER_Kidney = -1 MWDERIVEDUNIT_liter__minute; TER_Kidney is "PS_Brain";
  F_Heart = 0.04*F; F_Heart has MWDERIVEDUNIT_liter__minute; F_Heart is "F_Adipose";
  PS_Heart = kPS_Heart*Heart; PS_Heart has MWDERIVEDUNIT_liter__minute; PS_Heart is "PS_Adipose";
  F_Heart = -1 MWDERIVEDUNIT_liter__minute; F_Heart is "F_Bone";
  PS_Heart = -1 MWDERIVEDUNIT_liter__minute; PS_Heart is "PS_Bone";
  F_Heart = -1 MWDERIVEDUNIT_liter__minute;
  PS_Heart = -1 MWDERIVEDUNIT_liter__minute;
  F_Lungs = F; F_Lungs has MWDERIVEDUNIT_liter__minute;
  PS_Lungs = kPS_Lungs*Lungs; PS_Lungs has MWDERIVEDUNIT_liter__minute;
  F_Kidney = -1 MWDERIVEDUNIT_liter__minute;
  TER_Kidney = -1 MWDERIVEDUNIT_liter__minute;
  Rden_Kidney = -1 MWDERIVEDUNIT_nanomole__liter;
  R0_Kidney = -1 MWBUILTINPREFIX_nano_MWBUILTINUNIT_mole;
  lambdaIntern_Kidney = -1 MWDERIVEDUNIT_1__minute;
  lambdaRel_Kidney = -1 MWDERIVEDUNIT_1__minute;
  GFR = TER_Kidney/3*201/151; GFR has MWDERIVEDUNIT_liter__minute;
  phi = 0.66 dimensionless;
  f_exc = 0.96 dimensionless;
  lambdaIntern_Normal = lambdaIntern_Kidney; lambdaIntern_Normal has MWDERIVEDUNIT_1__minute;
  lambdaRel_Normal = lambdaRel_Kidney; lambdaRel_Normal has MWDERIVEDUNIT_1__minute;
  density = 1 MWDERIVEDUNIT_kilogram__liter;
  bodySurfaceArea = -1 MWDERIVEDUNIT_meter___2;
  hematocrit = 0.4 dimensionless;
  bodyHeight = -1 MWBUILTINUNIT_meter;
  bodyWeight = -1 kilogram;
  F = V_p*1.23/dMin; F has MWDERIVEDUNIT_liter__minute;
  V_p = 2.8*(1 - hematocrit)*bodySurfaceArea*dLiter/dMeter^2; V_p has MWBUILTINUNIT_liter;
  kPS_Tumor1 = 0.6 MWDERIVEDUNIT_1__minute;
  kPS_Tumor2 = 0.6 MWDERIVEDUNIT_1__minute;
  kPS_TumorRest = 0.6 MWDERIVEDUNIT_1__minute;
  kPS_SG = kPS_Muscle*100; kPS_SG has MWDERIVEDUNIT_1__minute;
  kPS_Spleen = kPS_Liver; kPS_Spleen has MWDERIVEDUNIT_1__minute;
  kPS_Prostate = 0.1 MWDERIVEDUNIT_1__minute;
  kPS_Liver = kPS_Muscle*100; kPS_Liver has MWDERIVEDUNIT_1__minute;
  kPS_Rest = kPS_Muscle; kPS_Rest has MWDERIVEDUNIT_1__minute;
  kPS_GI = kPS_Muscle; kPS_GI has MWDERIVEDUNIT_1__minute;
  kPS_Muscle = 0.02 MWDERIVEDUNIT_1__minute;
  kPS_Skin = kPS_Muscle; kPS_Skin has MWDERIVEDUNIT_1__minute;
  kPS_Brain = 0 MWDERIVEDUNIT_1__minute;
  kPS_RedMarrow = kPS_Liver; kPS_RedMarrow has MWDERIVEDUNIT_1__minute;
  kPS_Adipose = kPS_Muscle; kPS_Adipose has MWDERIVEDUNIT_1__minute;
  kPS_Bone = kPS_Muscle; kPS_Bone has MWDERIVEDUNIT_1__minute;
  kPS_Heart = kPS_Muscle; kPS_Heart has MWDERIVEDUNIT_1__minute;
  kPS_Lungs = kPS_Muscle*100; kPS_Lungs has MWDERIVEDUNIT_1__minute;
  kPSAlb_Tumor1 = -1 MWDERIVEDUNIT_1__minute;
  kPSAlb_Tumor2 = -1 MWDERIVEDUNIT_1__minute;
  kPSAlb_TumorRest = -1 MWDERIVEDUNIT_1__minute;
  F_Total = F + F_Kidney + F_Kidney + F_Kidney; F_Total has MWDERIVEDUNIT_liter__minute;
  f_SG = 1 MWDERIVEDUNIT_1__minute;
  f_Prostate = 0.18*(1 - hematocrit)/dMin; f_Prostate has MWDERIVEDUNIT_1__minute;
  f_Tumor1 = 0.5 MWDERIVEDUNIT_1__minute;
  f_Tumor2 = 0.5 MWDERIVEDUNIT_1__minute;
  HotTotalAmountOriginal = 10 MWBUILTINPREFIX_nano_MWBUILTINUNIT_mole;
  ColdTotalAmountOriginal = 100 MWBUILTINPREFIX_nano_MWBUILTINUNIT_mole;
  RepeatTimeInterval = 100 MWBUILTINUNIT_minute;
  RepeatCount = 0 dimensionless;
  PerInjectionRate = 100 MWDERIVEDUNIT_nanomole__minute;
  HotPerInjection = HotTotalAmount/(RepeatCount + 1); HotPerInjection has MWBUILTINPREFIX_nano_MWBUILTINUNIT_mole;
  ColdPerInjection = ColdTotalAmount/(RepeatCount + 1); ColdPerInjection has MWBUILTINPREFIX_nano_MWBUILTINUNIT_mole;
  dMin = 1 MWBUILTINUNIT_minute;
  dLiter = 1 MWBUILTINUNIT_liter;
  dMeter = 1 MWBUILTINUNIT_meter;
  dLiterKg = 1 MWDERIVEDUNIT_liter__kilogram;
  numberPerNanomole = 602200000000000 dimensionless;
  Tumor1VolumeCoeff = 1 dimensionless;
  Tumor1Volume = -1 MWBUILTINUNIT_liter;
  Albumin_0 = AlbuminDen*V_p; Albumin_0 has MWBUILTINPREFIX_nano_MWBUILTINUNIT_mole;
  AlbuminDen = -1 MWDERIVEDUNIT_nanomole__liter;
  K_D_Alb = -1 MWDERIVEDUNIT_nanomole__liter;
  injectionCoeff = 2 dimensionless;
  HotTotalAmount = injectionCoeff*HotTotalAmountOriginal; HotTotalAmount has MWBUILTINPREFIX_nano_MWBUILTINUNIT_mole;
  ColdTotalAmount = injectionCoeff*ColdTotalAmountOriginal; ColdTotalAmount has MWBUILTINPREFIX_nano_MWBUILTINUNIT_mole;
  Rden_Tumor1_Coeff = 1 dimensionless;

  // Assignment rules:
  R_Tumor2 := R0_Kidney - Hot_Tumor2Bound - Cold_Tumor2Bound;
  R_Tumor1 := R0_Kidney - Hot_Tumor1Bound - Cold_Tumor1Bound;
  R_Kidney := R0_Kidney - Hot_KidneyBound - Cold_KidneyBound;
  R_SG := R0_Kidney - Hot_SGBound - Cold_SGBound;
  R_TumorRest := R0_Kidney - Hot_TumorRestBound - Cold_TumorRestBound;
  R_Spleen := R0_Kidney - Hot_SpleenBound - Cold_SpleenBound;
  R_Liver := R0_Kidney - Hot_LiverBound - Cold_LiverBound;
  R_Prostate := R0_Kidney - Hot_ProstateBound - Cold_ProstateBound;
  R_GI := R0_Kidney - Hot_GIBound - Cold_GIBound;
  DataKidney := Hot_KidneyVas + Hot_KidneyInt + Hot_KidneyBound + Hot_KidneyIntern;

  // Reactions:
  decay: Hot_Tumor2Vas => Cold_Tumor2Vas; lambdaPhys*Hot_Tumor2Vas;
  hotAlbBind: Hot_Tumor2Vas + Albumin_Tumor2Vas -> AlbHot_Tumor2Vas; k_on_toAlb*Hot_Tumor2Vas*Albumin_Tumor2Vas/Tumor2Vas - k_off_toAlb*AlbHot_Tumor2Vas;
  albDecay: AlbHot_Tumor2Vas => AlbCold_Tumor2Vas; lambdaPhys*AlbHot_Tumor2Vas;
  coldAlbBind: Cold_Tumor2Vas + Albumin_Tumor2Vas -> AlbCold_Tumor2Vas; k_on_toAlb*Cold_Tumor2Vas*Albumin_Tumor2Vas/Tumor2Vas - k_off_toAlb*AlbCold_Tumor2Vas;
  Vas2Int: Hot_Tumor2Vas -> Hot_Tumor2Int; TER_Kidney/Tumor2Vas*Hot_Tumor2Vas - TER_Kidney/Tumor2Int*Hot_Tumor2Int;
  Vas2Int_1: AlbHot_Tumor2Vas => AlbHot_Tumor2Int; PSAlb_TumorRest/Tumor2Vas*AlbHot_Tumor2Vas;
  Vas2Int_2: AlbCold_Tumor2Vas => AlbCold_Tumor2Int; PSAlb_TumorRest/Tumor2Vas*AlbCold_Tumor2Vas;
  Vas2Int_3: Cold_Tumor2Vas => Cold_Tumor2Int; TER_Kidney/Tumor2Vas*Cold_Tumor2Vas - TER_Kidney/Tumor2Int*Cold_Tumor2Int;
  Int2Bound: Hot_Tumor2Int -> Hot_Tumor2Bound; k_on/Tumor2Int*Hot_Tumor2Int*R_Tumor2 - k_off*Hot_Tumor2Bound;
  Int2Bound_3: Cold_Tumor2Int -> Cold_Tumor2Bound; k_on/Tumor2Int*Cold_Tumor2Int*R_Tumor2 - k_off*Cold_Tumor2Bound;
  Bound2Intern: Hot_Tumor2Bound => Hot_Tumor2Intern; lambdaIntern_Kidney*Hot_Tumor2Bound;
  Bound2Intern_3: Cold_Tumor2Bound => Cold_Tumor2Intern; lambdaIntern_Kidney*Cold_Tumor2Bound;
  inFlow: Hot_Art => Hot_Tumor2Vas; F_Kidney/Art*Hot_Art;
  inFlow_1: AlbHot_Art => AlbHot_Tumor2Vas; F_Kidney/Art*AlbHot_Art;
  inFlow_2: AlbCold_Art => AlbCold_Tumor2Vas; F_Kidney/Art*AlbCold_Art;
  inFlow_3: Cold_Art => Cold_Tumor2Vas; F_Kidney/Art*Cold_Art;
  outFlow: Hot_Tumor2Vas => Hot_Vein; F_Kidney/Tumor2Vas*Hot_Tumor2Vas;
  outFlow_1: AlbHot_Tumor2Vas => AlbHot_Vein; F_Kidney/Tumor2Vas*AlbHot_Tumor2Vas;
  outFlow_2: AlbCold_Tumor2Vas => AlbCold_Vein; F_Kidney/Tumor2Vas*AlbCold_Tumor2Vas;
  outFlow_3: Cold_Tumor2Vas => Cold_Vein; F_Kidney/Tumor2Vas*Cold_Tumor2Vas;
  decay_1: Hot_Tumor2Int => Cold_Tumor2Int; lambdaPhys*Hot_Tumor2Int;
  hotAlbBind_1: Hot_Tumor2Int + Albumin_Tumor2Int -> AlbHot_Tumor2Int; k_on_toAlb*Hot_Tumor2Int*Albumin_Tumor2Int/Tumor2Int - k_off_toAlb*AlbHot_Tumor2Int;
  albDecay_1: AlbHot_Tumor2Int => AlbCold_Tumor2Int; lambdaPhys*AlbHot_Tumor2Int;
  coldAlbBind_1: Cold_Tumor2Int + Albumin_Tumor2Int -> AlbCold_Tumor2Int; k_on_toAlb*Cold_Tumor2Int*Albumin_Tumor2Int/Tumor2Int - k_off_toAlb*AlbCold_Tumor2Int;
  decay_2: Hot_Tumor2Bound => Cold_Tumor2Bound; lambdaPhys*Hot_Tumor2Bound;
  decay_3: Hot_Tumor2Intern => Cold_Tumor2Intern; lambdaPhys*Hot_Tumor2Intern;
  Intern2Rel: Hot_Tumor2Intern => ; lambdaRel_Kidney*Hot_Tumor2Intern;
  Intern2Rel_3: Cold_Tumor2Intern => ; lambdaRel_Kidney*Cold_Tumor2Intern;
  decay_4: Hot_Art => Cold_Art; lambdaPhys*Hot_Art;
  hotAlbBind_4: Hot_Art + Albumin_Art -> AlbHot_Art; k_on_toAlb*Hot_Art*Albumin_Art/Art - k_off_toAlb*AlbHot_Art;
  albDecay_4: AlbHot_Art => AlbCold_Art; lambdaPhys*AlbHot_Art;
  coldAlbBind_4: Cold_Art + Albumin_Art -> AlbCold_Art; k_on_toAlb*Cold_Art*Albumin_Art/Art - k_off_toAlb*AlbCold_Art;
  decay_5: Hot_Vein => Cold_Vein; lambdaPhys*Hot_Vein;
  hotAlbBind_5: Hot_Vein + Albumin_Vein -> AlbHot_Vein; k_on_toAlb*Hot_Vein*Albumin_Vein/Vein - k_off_toAlb*AlbHot_Vein;
  albDecay_5: AlbHot_Vein => AlbCold_Vein; lambdaPhys*AlbHot_Vein;
  coldAlbBind_5: Cold_Vein + Albumin_Vein -> AlbCold_Vein; k_on_toAlb*Cold_Vein*Albumin_Vein/Vein - k_off_toAlb*AlbCold_Vein;
  decay_6: Hot_Tumor1Vas => Cold_Tumor1Vas; lambdaPhys*Hot_Tumor1Vas;
  hotAlbBind_6: Hot_Tumor1Vas + Albumin_Tumor1Vas -> AlbHot_Tumor1Vas; k_on_toAlb*Hot_Tumor1Vas*Albumin_Tumor1Vas/Tumor1Vas - k_off_toAlb*AlbHot_Tumor1Vas;
  albDecay_6: AlbHot_Tumor1Vas => AlbCold_Tumor1Vas; lambdaPhys*AlbHot_Tumor1Vas;
  coldAlbBind_6: Cold_Tumor1Vas + Albumin_Tumor1Vas -> AlbCold_Tumor1Vas; k_on_toAlb*Cold_Tumor1Vas*Albumin_Tumor1Vas/Tumor1Vas - k_off_toAlb*AlbCold_Tumor1Vas;
  Vas2Int_4: Hot_Tumor1Vas -> Hot_Tumor1Int; TER_Kidney/Tumor1Vas*Hot_Tumor1Vas - TER_Kidney/Tumor1Int*Hot_Tumor1Int;
  Vas2Int_5: AlbHot_Tumor1Vas -> AlbHot_Tumor1Int; PSAlb_TumorRest/Tumor1Vas*AlbHot_Tumor1Vas - PSAlb_TumorRest/Tumor1Int*AlbHot_Tumor1Int;
  Vas2Int_6: AlbCold_Tumor1Vas => AlbCold_Tumor1Int; PSAlb_TumorRest/Tumor1Vas*AlbCold_Tumor1Vas - PSAlb_TumorRest/Tumor1Int*AlbCold_Tumor1Int;
  Vas2Int_7: Cold_Tumor1Vas -> Cold_Tumor1Int; TER_Kidney/Tumor1Vas*Cold_Tumor1Vas - TER_Kidney/Tumor1Int*Cold_Tumor1Int;
  Int2Bound_4: Hot_Tumor1Int -> Hot_Tumor1Bound; k_on/Tumor1Int*Hot_Tumor1Int*R_Tumor1 - k_off*Hot_Tumor1Bound;
  Int2Bound_7: Cold_Tumor1Int -> Cold_Tumor1Bound; k_on/Tumor1Int*R_Tumor1*Cold_Tumor1Int - k_off*Cold_Tumor1Bound;
  Bound2Intern_4: Hot_Tumor1Bound => Hot_Tumor1Intern; lambdaIntern_Kidney*Hot_Tumor1Bound;
  Bound2Intern_7: Cold_Tumor1Bound => Cold_Tumor1Intern; lambdaIntern_Kidney*Cold_Tumor1Bound;
  inFlow_4: Hot_Art => Hot_Tumor1Vas; F_Kidney/Art*Hot_Art;
  inFlow_5: AlbHot_Art => AlbHot_Tumor1Vas; F_Kidney/Art*AlbHot_Art;
  inFlow_6: AlbCold_Art => AlbCold_Tumor1Vas; F_Kidney/Art*AlbCold_Art;
  inFlow_7: Cold_Art => Cold_Tumor1Vas; F_Kidney/Art*Cold_Art;
  outFlow_4: Hot_Tumor1Vas => Hot_Vein; F_Kidney/Tumor1Vas*Hot_Tumor1Vas;
  outFlow_5: AlbHot_Tumor1Vas => AlbHot_Vein; F_Kidney/Tumor1Vas*AlbHot_Tumor1Vas;
  outFlow_6: AlbCold_Tumor1Vas => AlbCold_Vein; F_Kidney/Tumor1Vas*AlbCold_Tumor1Vas;
  outFlow_7: Cold_Tumor1Vas => Cold_Vein; F_Kidney/Tumor1Vas*Cold_Tumor1Vas;
  decay_7: Hot_Tumor1Int => Cold_Tumor1Int; lambdaPhys*Hot_Tumor1Int;
  hotAlbBind_7: Hot_Tumor1Int + Albumin_Tumor1Int => AlbHot_Tumor1Int; k_on_toAlb*Hot_Tumor1Int*Albumin_Tumor1Int/Tumor1Int - k_off_toAlb*AlbHot_Tumor1Int;
  albDecay_7: AlbHot_Tumor1Int => AlbCold_Tumor1Int; lambdaPhys*AlbHot_Tumor1Int;
  coldAlbBind_7: Cold_Tumor1Int + Albumin_Tumor1Int -> AlbCold_Tumor1Int; k_on_toAlb*Cold_Tumor1Int*Albumin_Tumor1Int/Tumor1Int - k_off_toAlb*AlbCold_Tumor1Int;
  decay_8: Hot_Tumor1Bound => Cold_Tumor1Bound; lambdaPhys*Hot_Tumor1Bound;
  decay_9: Hot_Tumor1Intern => Cold_Tumor1Intern; lambdaPhys*Hot_Tumor1Intern;
  Intern2Rel_4: Hot_Tumor1Intern => ; lambdaRel_Kidney*Hot_Tumor1Intern;
  Intern2Rel_7: Cold_Tumor1Intern => ; lambdaRel_Kidney*Cold_Tumor1Intern;
  decay_12: Hot_KidneyVas => Cold_KidneyVas; lambdaPhys*Hot_KidneyVas;
  hotAlbBind_12: Hot_KidneyVas + Albumin_KidneyVas -> AlbHot_KidneyVas; k_on_toAlb*Hot_KidneyVas*Albumin_KidneyVas/KidneyVas - k_off_toAlb*AlbHot_KidneyVas;
  albDecay_12: AlbHot_KidneyVas => AlbCold_KidneyVas; lambdaPhys*AlbHot_KidneyVas;
  coldAlbBind_12: Cold_KidneyVas + Albumin_KidneyVas -> AlbCold_KidneyVas; k_on_toAlb*Cold_KidneyVas*Albumin_KidneyVas/KidneyVas - k_off_toAlb*AlbCold_KidneyVas;
  Int2Bound_8: Hot_KidneyInt -> Hot_KidneyBound; k_on/KidneyInt*Hot_KidneyInt*R_Kidney - k_off*Hot_KidneyBound;
  Int2Bound_11: Cold_KidneyInt -> Cold_KidneyBound; k_on/KidneyInt*Cold_KidneyInt*R_Kidney - k_off*Cold_KidneyBound;
  Bound2Intern_8: Hot_KidneyBound => Hot_KidneyIntern; lambdaIntern_Kidney*Hot_KidneyBound;
  Bound2Intern_11: Cold_KidneyBound => Cold_KidneyIntern; lambdaIntern_Kidney*Cold_KidneyBound;
  inFlow_12: Hot_Art => Hot_KidneyVas; F_Kidney/Art*Hot_Art;
  inFlow_13: AlbHot_Art => AlbHot_KidneyVas; F_Kidney/Art*AlbHot_Art;
  inFlow_14: AlbCold_Art => AlbCold_KidneyVas; F_Kidney/Art*AlbCold_Art;
  inFlow_15: Cold_Art => Cold_KidneyVas; F_Kidney/Art*Cold_Art;
  outFlow_12: Hot_KidneyVas => Hot_Vein; F_Kidney/KidneyVas*Hot_KidneyVas;
  outFlow_13: AlbHot_KidneyVas => AlbHot_Vein; F_Kidney/KidneyVas*AlbHot_KidneyVas;
  outFlow_14: AlbCold_KidneyVas => AlbCold_Vein; F_Kidney/KidneyVas*AlbCold_KidneyVas;
  outFlow_15: Cold_KidneyVas => Cold_Vein; F_Kidney/KidneyVas*Cold_KidneyVas;
  decay_13: Hot_KidneyInt => Cold_KidneyInt; lambdaPhys*Hot_KidneyInt;
  decay_14: Hot_KidneyBound => Cold_KidneyBound; lambdaPhys*Hot_KidneyBound;
  decay_15: Hot_KidneyIntern => Cold_KidneyIntern; lambdaPhys*Hot_KidneyIntern;
  Intern2Rel_8: Hot_KidneyIntern => ; lambdaRel_Kidney*Hot_KidneyIntern;
  Intern2Rel_11: Cold_KidneyIntern => ; lambdaRel_Kidney*Cold_KidneyIntern;
  decay_16: Hot_HeartVas => Cold_HeartVas; lambdaPhys*Hot_HeartVas;
  hotAlbBind_13: Hot_HeartVas + Albumin_HeartVas -> AlbHot_HeartVas; k_on_toAlb*Hot_HeartVas*Albumin_HeartVas/HeartVas - k_off_toAlb*AlbHot_HeartVas;
  albDecay_13: AlbHot_HeartVas => AlbCold_HeartVas; lambdaPhys*AlbHot_HeartVas;
  coldAlbBind_13: Cold_HeartVas + Albumin_HeartVas -> AlbCold_HeartVas; k_on_toAlb*Cold_HeartVas*Albumin_HeartVas/HeartVas - k_off_toAlb*AlbCold_HeartVas;
  Vas2Int_13: Hot_HeartVas -> Hot_HeartInt; PS_Heart/HeartVas*Hot_HeartVas - PS_Heart/HeartInt*Hot_HeartInt;
  Vas2Int_16: Cold_HeartVas -> Cold_HeartInt; PS_Heart/HeartVas*Cold_HeartVas - PS_Heart/HeartInt*Cold_HeartInt;
  inFlow_16: Hot_Art => Hot_HeartVas; F_Heart/Art*Hot_Art;
  inFlow_17: AlbHot_Art => AlbHot_HeartVas; F_Heart/Art*AlbHot_Art;
  inFlow_18: AlbCold_Art => AlbCold_HeartVas; F_Heart/Art*AlbCold_Art;
  inFlow_19: Cold_Art => Cold_HeartVas; F_Heart/Art*Cold_Art;
  outFlow_16: Hot_HeartVas => Hot_Vein; F_Heart/HeartVas*Hot_HeartVas;
  outFlow_17: AlbHot_HeartVas => AlbHot_Vein; F_Heart/HeartVas*AlbHot_HeartVas;
  outFlow_18: AlbCold_HeartVas => AlbCold_Vein; F_Heart/HeartVas*AlbCold_HeartVas;
  outFlow_19: Cold_HeartVas => Cold_Vein; F_Heart/HeartVas*Cold_HeartVas;
  decay_17: Hot_HeartInt => Cold_HeartInt; lambdaPhys*Hot_HeartInt;
  decay_18: Hot_SGVas => Cold_SGVas; lambdaPhys*Hot_SGVas;
  hotAlbBind_14: Hot_SGVas + Albumin_SGVas -> AlbHot_SGVas; k_on_toAlb*Hot_SGVas*Albumin_SGVas/SGVas - k_off_toAlb*AlbHot_SGVas;
  albDecay_14: AlbHot_SGVas => AlbCold_SGVas; lambdaPhys*AlbHot_SGVas;
  coldAlbBind_14: Cold_SGVas + Albumin_SGVas -> AlbCold_SGVas; k_on_toAlb*Cold_SGVas*Albumin_SGVas/SGVas - k_off_toAlb*AlbCold_SGVas;
  Vas2Int_14: Hot_SGVas -> Hot_SGInt; TER_Kidney/SGVas*Hot_SGVas - TER_Kidney/SGInt*Hot_SGInt;
  Vas2Int_17: Cold_SGVas -> Cold_SGInt; TER_Kidney/SGVas*Cold_SGVas - TER_Kidney/SGInt*Cold_SGInt;
  Int2Bound_9: Hot_SGInt -> Hot_SGBound; k_on/SGInt*Hot_SGInt*R_SG - k_off*Hot_SGBound;
  Int2Bound_12: Cold_SGInt -> Cold_SGBound; k_on/SGInt*Cold_SGInt*R_SG - k_off*Cold_SGBound;
  Bound2Intern_9: Hot_SGBound => Hot_SGIntern; lambdaIntern_Kidney*Hot_SGBound;
  Bound2Intern_12: Cold_SGBound => Cold_SGIntern; lambdaIntern_Kidney*Cold_SGBound;
  inFlow_20: Hot_Art => Hot_SGVas; F_Kidney/Art*Hot_Art;
  inFlow_21: AlbHot_Art => AlbHot_SGVas; F_Kidney/Art*AlbHot_Art;
  inFlow_22: AlbCold_Art => AlbCold_SGVas; F_Kidney/Art*AlbCold_Art;
  inFlow_23: Cold_Art => Cold_SGVas; F_Kidney/Art*Cold_Art;
  outFlow_20: Hot_SGVas => Hot_Vein; F_Kidney/SGVas*Hot_SGVas;
  outFlow_21: AlbHot_SGVas => AlbHot_Vein; F_Kidney/SGVas*AlbHot_SGVas;
  outFlow_22: AlbCold_SGVas => AlbCold_Vein; F_Kidney/SGVas*AlbCold_SGVas;
  outFlow_23: Cold_SGVas => Cold_Vein; F_Kidney/SGVas*Cold_SGVas;
  decay_19: Hot_SGInt => Cold_SGInt; lambdaPhys*Hot_SGInt;
  decay_20: Hot_SGBound => Cold_SGBound; lambdaPhys*Hot_SGBound;
  decay_21: Hot_SGIntern => Cold_SGIntern; lambdaPhys*Hot_SGIntern;
  Intern2Rel_9: Hot_SGIntern => ; lambdaRel_Kidney*Hot_SGIntern;
  Intern2Rel_12: Cold_SGIntern => ; lambdaRel_Kidney*Cold_SGIntern;
  decay_22: Hot_BoneVas => Cold_BoneVas; lambdaPhys*Hot_BoneVas;
  hotAlbBind_15: Hot_BoneVas + Albumin_BoneVas -> AlbHot_BoneVas; k_on_toAlb*Hot_BoneVas*Albumin_BoneVas/BoneVas - k_off_toAlb*AlbHot_BoneVas;
  albDecay_15: AlbHot_BoneVas => AlbCold_BoneVas; lambdaPhys*AlbHot_BoneVas;
  coldAlbBind_15: Cold_BoneVas + Albumin_BoneVas -> AlbCold_BoneVas; k_on_toAlb*Cold_BoneVas*Albumin_BoneVas/BoneVas - k_off_toAlb*AlbCold_BoneVas;
  Vas2Int_18: Hot_BoneVas -> Hot_BoneInt; PS_Heart/BoneVas*Hot_BoneVas - PS_Heart/BoneInt*Hot_BoneInt;
  Vas2Int_19: Cold_BoneVas -> Cold_BoneInt; PS_Heart/BoneVas*Cold_BoneVas - PS_Heart/BoneInt*Cold_BoneInt;
  inFlow_24: Hot_Art => Hot_BoneVas; F_Heart/Art*Hot_Art;
  inFlow_25: AlbHot_Art => AlbHot_BoneVas; F_Heart/Art*AlbHot_Art;
  inFlow_26: AlbCold_Art => AlbCold_BoneVas; F_Heart/Art*AlbCold_Art;
  inFlow_27: Cold_Art => Cold_BoneVas; F_Heart/Art*Cold_Art;
  outFlow_24: Hot_BoneVas => Hot_Vein; F_Heart/BoneVas*Hot_BoneVas;
  outFlow_25: AlbHot_BoneVas => AlbHot_Vein; F_Heart/BoneVas*AlbHot_BoneVas;
  outFlow_26: AlbCold_BoneVas => AlbCold_Vein; F_Heart/BoneVas*AlbCold_BoneVas;
  outFlow_27: Cold_BoneVas => Cold_Vein; F_Heart/BoneVas*Cold_BoneVas;
  decay_23: Hot_BoneInt => Cold_BoneInt; lambdaPhys*Hot_BoneInt;
  decay_24: Hot_TumorRestVas => Cold_TumorRestVas; lambdaPhys*Hot_TumorRestVas;
  hotAlbBind_16: Hot_TumorRestVas + Albumin_TumorRestVas -> AlbHot_TumorRestVas; k_on_toAlb*Hot_TumorRestVas*Albumin_TumorRestVas/TumorRestVas - k_off_toAlb*AlbHot_TumorRestVas;
  albDecay_16: AlbHot_TumorRestVas => AlbCold_TumorRestVas; lambdaPhys*AlbHot_TumorRestVas;
  coldAlbBind_16: Cold_TumorRestVas + Albumin_TumorRestVas -> AlbCold_TumorRestVas; k_on_toAlb*Cold_TumorRestVas*Albumin_TumorRestVas/TumorRestVas - k_off_toAlb*AlbCold_TumorRestVas;
  Vas2Int_20: Hot_TumorRestVas -> Hot_TumorRestInt; TER_Kidney/TumorRestVas*Hot_TumorRestVas - TER_Kidney/TumorRestInt*Hot_TumorRestInt;
  Vas2Int_21: AlbHot_TumorRestVas -> AlbHot_TumorRestInt; PSAlb_TumorRest/TumorRestVas*AlbHot_TumorRestVas - PSAlb_TumorRest/TumorRestInt*AlbHot_TumorRestInt;
  Vas2Int_22: AlbCold_TumorRestVas -> AlbCold_TumorRestInt; PSAlb_TumorRest/TumorRestVas*AlbCold_TumorRestVas - PSAlb_TumorRest/TumorRestInt*AlbCold_TumorRestInt;
  Vas2Int_23: Cold_TumorRestVas -> Cold_TumorRestInt; TER_Kidney/TumorRestVas*Cold_TumorRestVas - TER_Kidney/TumorRestInt*Cold_TumorRestInt;
  Int2Bound_10: Hot_TumorRestInt -> Hot_TumorRestBound; k_on/TumorRestInt*Hot_TumorRestInt*R_TumorRest - k_off*Hot_TumorRestBound;
  Int2Bound_15: Cold_TumorRestInt -> Cold_TumorRestBound; k_on/TumorRestInt*Cold_TumorRestInt*R_TumorRest - k_off*Cold_TumorRestBound;
  Bound2Intern_10: Hot_TumorRestBound => Hot_TumorRestIntern; lambdaIntern_Kidney*Hot_TumorRestBound;
  Bound2Intern_15: Cold_TumorRestBound => Cold_TumorRestIntern; lambdaIntern_Kidney*Cold_TumorRestBound;
  inFlow_28: Hot_Art => Hot_TumorRestVas; F_Kidney/Art*Hot_Art;
  inFlow_29: AlbHot_Art => AlbHot_TumorRestVas; F_Kidney/Art*AlbHot_Art;
  inFlow_30: AlbCold_Art -> AlbCold_TumorRestVas; F_Kidney/Art*AlbCold_Art;
  inFlow_31: Cold_Art -> Cold_TumorRestVas; F_Kidney/Art*Cold_Art;
  outFlow_28: Hot_TumorRestVas => Hot_Vein; F_Kidney/TumorRestVas*Hot_TumorRestVas;
  outFlow_29: AlbHot_TumorRestVas => AlbHot_Vein; F_Kidney/TumorRestVas*AlbHot_TumorRestVas;
  outFlow_30: AlbCold_TumorRestVas => AlbCold_Vein; F_Kidney/TumorRestVas*AlbCold_TumorRestVas;
  outFlow_31: Cold_TumorRestVas => Cold_Vein; F_Kidney/TumorRestVas*Cold_TumorRestVas;
  decay_25: Hot_TumorRestInt => Cold_TumorRestInt; lambdaPhys*Hot_TumorRestInt;
  hotAlbBind_17: Hot_TumorRestInt + Albumin_TumorRestInt => AlbHot_TumorRestInt; k_on_toAlb*Hot_TumorRestInt*Albumin_TumorRestInt/TumorRestInt - k_off_toAlb*AlbHot_TumorRestInt;
  albDecay_17: AlbHot_TumorRestInt => AlbCold_TumorRestInt; lambdaPhys*AlbHot_TumorRestInt;
  coldAlbBind_17: Cold_TumorRestInt + Albumin_TumorRestInt -> AlbCold_TumorRestInt; k_on_toAlb*Cold_TumorRestInt*Albumin_TumorRestInt/TumorRestInt - k_off_toAlb*AlbCold_TumorRestInt;
  decay_26: Hot_TumorRestBound => Cold_TumorRestBound; lambdaPhys*Hot_TumorRestBound;
  decay_27: Hot_TumorRestIntern => Cold_TumorRestIntern; lambdaPhys*Hot_TumorRestIntern;
  Intern2Rel_10: Hot_TumorRestIntern => ; lambdaRel_Kidney*Hot_TumorRestIntern;
  Intern2Rel_15: Cold_TumorRestIntern => ; lambdaRel_Kidney*Cold_TumorRestIntern;
  decay_28: Hot_SpleenVas => Cold_SpleenVas; lambdaPhys*Hot_SpleenVas;
  hotAlbBind_20: Hot_SpleenVas + Albumin_SpleenVas -> AlbHot_SpleenVas; k_on_toAlb*Hot_SpleenVas*Albumin_SpleenVas/SpleenVas - k_off_toAlb*AlbHot_SpleenVas;
  albDecay_20: AlbHot_SpleenVas => AlbCold_SpleenVas; lambdaPhys*AlbHot_SpleenVas;
  coldAlbBind_20: Cold_SpleenVas + Albumin_SpleenVas -> AlbCold_SpleenVas; k_on_toAlb*Cold_SpleenVas*Albumin_SpleenVas/SpleenVas - k_off_toAlb*AlbCold_SpleenVas;
  Vas2Int_24: Hot_SpleenVas -> Hot_SpleenInt; TER_Kidney/SpleenVas*Hot_SpleenVas - TER_Kidney/SpleenInt*Hot_SpleenInt;
  Vas2Int_25: Cold_SpleenVas -> Cold_SpleenInt; TER_Kidney/SpleenVas*Cold_SpleenVas - TER_Kidney/SpleenInt*Cold_SpleenInt;
  Int2Bound_16: Hot_SpleenInt -> Hot_SpleenBound; k_on/SpleenInt*Hot_SpleenInt*R_Spleen - k_off*Hot_SpleenBound;
  Int2Bound_17: Cold_SpleenInt -> Cold_SpleenBound; k_on/SpleenInt*Cold_SpleenInt*R_Spleen - k_off*Cold_SpleenBound;
  Bound2Intern_16: Hot_SpleenBound => Hot_SpleenIntern; lambdaIntern_Kidney*Hot_SpleenBound;
  Bound2Intern_17: Cold_SpleenBound => Cold_SpleenIntern; lambdaIntern_Kidney*Cold_SpleenBound;
  inFlow_32: Hot_Art => Hot_SpleenVas; F_Kidney/Art*Hot_Art;
  inFlow_33: AlbHot_Art => AlbHot_SpleenVas; F_Kidney/Art*AlbHot_Art;
  inFlow_34: AlbCold_Art => AlbCold_SpleenVas; F_Kidney/Art*AlbCold_Art;
  inFlow_35: Cold_Art => Cold_SpleenVas; F_Kidney/Art*Cold_Art;
  decay_29: Hot_SpleenInt => Cold_SpleenInt; lambdaPhys*Hot_SpleenInt;
  decay_30: Hot_SpleenBound => Cold_SpleenBound; lambdaPhys*Hot_SpleenBound;
  decay_31: Hot_SpleenIntern => Cold_SpleenIntern; lambdaPhys*Hot_SpleenIntern;
  Intern2Rel_16: Hot_SpleenIntern => ; lambdaRel_Kidney*Hot_SpleenIntern;
  Intern2Rel_17: Cold_SpleenIntern => ; lambdaRel_Kidney*Cold_SpleenIntern;
  decay_32: Hot_LiverVas => Cold_LiverVas; lambdaPhys*Hot_LiverVas;
  hotAlbBind_21: Hot_LiverVas + Albumin_LiverVas -> AlbHot_LiverVas; k_on_toAlb*Hot_LiverVas*Albumin_LiverVas/LiverVas - k_off_toAlb*AlbHot_LiverVas;
  albDecay_21: AlbHot_LiverVas => AlbCold_LiverVas; lambdaPhys*AlbHot_LiverVas;
  coldAlbBind_21: Cold_LiverVas + Albumin_LiverVas -> AlbCold_LiverVas; k_on_toAlb*Cold_LiverVas*Albumin_LiverVas/LiverVas - k_off_toAlb*AlbCold_LiverVas;
  Vas2Int_26: Hot_LiverVas -> Hot_LiverInt; TER_Kidney/LiverVas*Hot_LiverVas - TER_Kidney/LiverInt*Hot_LiverInt;
  Vas2Int_27: Cold_LiverVas -> Cold_LiverInt; TER_Kidney/LiverVas*Cold_LiverVas - TER_Kidney/LiverInt*Cold_LiverInt;
  Int2Bound_18: Hot_LiverInt -> Hot_LiverBound; k_on/LiverInt*Hot_LiverInt*R_Liver - k_off*Hot_LiverBound;
  Int2Bound_19: Cold_LiverInt -> Cold_LiverBound; k_on/LiverInt*Cold_LiverInt*R_Liver - k_off*Cold_LiverBound;
  Bound2Intern_18: Hot_LiverBound => Hot_LiverIntern; lambdaIntern_Kidney*Hot_LiverBound;
  Bound2Intern_19: Cold_LiverBound => Cold_LiverIntern; lambdaIntern_Kidney*Cold_LiverBound;
  inFlow_36: Hot_Art => Hot_LiverVas; F_Kidney/Art*Hot_Art;
  inFlow_37: AlbHot_Art => AlbHot_LiverVas; F_Kidney/Art*AlbHot_Art;
  inFlow_38: AlbCold_Art => AlbCold_LiverVas; F_Kidney/Art*AlbCold_Art;
  inFlow_39: Cold_Art => Cold_LiverVas; F_Kidney/Art*Cold_Art;
  outFlow_36: Hot_LiverVas => Hot_Vein; F_Kidney/LiverVas*Hot_LiverVas;
  outFlow_37: AlbHot_LiverVas => AlbHot_Vein; F_Kidney/LiverVas*AlbHot_LiverVas;
  outFlow_38: AlbCold_LiverVas => AlbCold_Vein; F_Kidney/LiverVas*AlbCold_LiverVas;
  outFlow_39: Cold_LiverVas => Cold_Vein; F_Kidney/LiverVas*Cold_LiverVas;
  decay_33: Hot_LiverInt => Cold_LiverInt; lambdaPhys*Hot_LiverInt;
  decay_34: Hot_LiverBound => Cold_LiverBound; lambdaPhys*Hot_LiverBound;
  decay_35: Hot_LiverIntern => Cold_LiverIntern; lambdaPhys*Hot_LiverIntern;
  Intern2Rel_18: Hot_LiverIntern => ; lambdaRel_Kidney*Hot_LiverIntern;
  Intern2Rel_19: Cold_LiverIntern => ; lambdaRel_Kidney*Cold_LiverIntern;
  decay_36: Hot_ProstateVas => Cold_ProstateVas; lambdaPhys*Hot_ProstateVas;
  hotAlbBind_22: Hot_ProstateVas + Albumin_ProstateVas -> AlbHot_ProstateVas; k_on_toAlb*Hot_ProstateVas*Albumin_ProstateVas/ProstateVas - k_off_toAlb*AlbHot_ProstateVas;
  albDecay_22: AlbHot_ProstateVas => AlbCold_ProstateVas; lambdaPhys*AlbHot_ProstateVas;
  coldAlbBind_22: Cold_ProstateVas + Albumin_ProstateVas -> AlbCold_ProstateVas; k_on_toAlb*Cold_ProstateVas*Albumin_ProstateVas/ProstateVas - k_off_toAlb*AlbCold_ProstateVas;
  Vas2Int_28: Hot_ProstateVas -> Hot_ProstateInt; TER_Kidney/ProstateVas*Hot_ProstateVas - TER_Kidney/ProstateInt*Hot_ProstateInt;
  Vas2Int_29: Cold_ProstateVas -> Cold_ProstateInt; TER_Kidney/ProstateVas*Cold_ProstateVas - TER_Kidney/ProstateInt*Cold_ProstateInt;
  Int2Bound_20: Hot_ProstateInt -> Hot_ProstateBound; k_on/ProstateInt*Hot_ProstateInt*R_Prostate - k_off*Hot_ProstateBound;
  Int2Bound_21: Cold_ProstateInt -> Cold_ProstateBound; k_on/ProstateInt*Cold_ProstateInt*R_Prostate - k_off*Cold_ProstateBound;
  Bound2Intern_20: Hot_ProstateBound => Hot_ProstateIntern; lambdaIntern_Kidney*Hot_ProstateBound;
  Bound2Intern_21: Cold_ProstateBound => Cold_ProstateIntern; lambdaIntern_Kidney*Cold_ProstateBound;
  inFlow_40: Hot_Art => Hot_ProstateVas; F_Kidney/Art*Hot_Art;
  inFlow_41: AlbHot_Art => AlbHot_ProstateVas; F_Kidney/Art*AlbHot_Art;
  inFlow_42: AlbCold_Art => AlbCold_ProstateVas; F_Kidney/Art*AlbCold_Art;
  inFlow_43: Cold_Art => Cold_ProstateVas; F_Kidney/Art*Cold_Art;
  outFlow_40: Hot_ProstateVas => Hot_Vein; F_Kidney/ProstateVas*Hot_ProstateVas;
  outFlow_41: AlbHot_ProstateVas => AlbHot_Vein; F_Kidney/ProstateVas*AlbHot_ProstateVas;
  outFlow_42: AlbCold_ProstateVas => AlbCold_Vein; F_Kidney/ProstateVas*AlbCold_ProstateVas;
  outFlow_43: Cold_ProstateVas => Cold_Vein; F_Kidney/ProstateVas*Cold_ProstateVas;
  decay_37: Hot_ProstateInt => Cold_ProstateInt; lambdaPhys*Hot_ProstateInt;
  decay_38: Hot_ProstateBound => Cold_ProstateBound; lambdaPhys*Hot_ProstateBound;
  decay_39: Hot_ProstateIntern => Cold_ProstateIntern; lambdaPhys*Hot_ProstateIntern;
  Intern2Rel_20: Hot_ProstateIntern => ; lambdaRel_Kidney*Hot_ProstateIntern;
  Intern2Rel_21: Cold_ProstateIntern => ; lambdaRel_Kidney*Cold_ProstateIntern;
  decay_40: Hot_GIVas => Cold_GIVas; lambdaPhys*Hot_GIVas;
  hotAlbBind_23: Hot_GIVas + Albumin_GIVas -> AlbHot_GIVas; k_on_toAlb*Hot_GIVas*Albumin_GIVas/GIVas - k_off_toAlb*AlbHot_GIVas;
  albDecay_23: AlbHot_GIVas => AlbCold_GIVas; lambdaPhys*AlbHot_GIVas;
  coldAlbBind_23: Cold_GIVas + Albumin_GIVas -> AlbCold_GIVas; k_on_toAlb*Cold_GIVas*Albumin_GIVas/GIVas - k_off_toAlb*AlbCold_GIVas;
  Vas2Int_30: Hot_GIVas -> Hot_GIInt; TER_Kidney/GIVas*Hot_GIVas - TER_Kidney/GIInt*Hot_GIInt;
  Vas2Int_31: Cold_GIVas -> Cold_GIInt; TER_Kidney/GIVas*Cold_GIVas - TER_Kidney/GIInt*Cold_GIInt;
  Int2Bound_22: Hot_GIInt -> Hot_GIBound; k_on/GIInt*Hot_GIInt*R_GI - k_off*Hot_GIBound;
  Int2Bound_23: Cold_GIInt -> Cold_GIBound; k_on/GIInt*Cold_GIInt*R_GI - k_off*Cold_GIBound;
  Bound2Intern_22: Hot_GIBound => Hot_GIIntern; lambdaIntern_Kidney*Hot_GIBound;
  Bound2Intern_23: Cold_GIBound => Cold_GIIntern; lambdaIntern_Kidney*Cold_GIBound;
  inFlow_44: Hot_Art => Hot_GIVas; F_Kidney/Art*Hot_Art;
  inFlow_45: AlbHot_Art => AlbHot_GIVas; F_Kidney/Art*AlbHot_Art;
  inFlow_46: AlbCold_Art => AlbCold_GIVas; F_Kidney/Art*AlbCold_Art;
  inFlow_47: Cold_Art => Cold_GIVas; F_Kidney/Art*Cold_Art;
  decay_41: Hot_GIInt => Cold_GIInt; lambdaPhys*Hot_GIInt;
  decay_42: Hot_GIBound => Cold_GIBound; lambdaPhys*Hot_GIBound;
  decay_43: Hot_GIIntern => Cold_GIIntern; lambdaPhys*Hot_GIIntern;
  Intern2Rel_22: Hot_GIIntern => ; lambdaRel_Kidney*Hot_GIIntern;
  Intern2Rel_23: Cold_GIIntern => ; lambdaRel_Kidney*Cold_GIIntern;
  decay_44: Hot_RestVas => Cold_RestVas; lambdaPhys*Hot_RestVas;
  hotAlbBind_24: Hot_RestVas + Albumin_RestVas -> AlbHot_RestVas; k_on_toAlb*Hot_RestVas*Albumin_RestVas/RestVas - k_off_toAlb*AlbHot_RestVas;
  albDecay_24: AlbHot_RestVas => AlbCold_RestVas; lambdaPhys*AlbHot_RestVas;
  coldAlbBind_24: Cold_RestVas + Albumin_RestVas -> AlbCold_RestVas; k_on_toAlb*Cold_RestVas*Albumin_RestVas/RestVas - k_off_toAlb*AlbCold_RestVas;
  Vas2Int_32: Hot_RestVas -> Hot_RestInt; TER_Kidney/RestVas*Hot_RestVas - TER_Kidney/RestInt*Hot_RestInt;
  Vas2Int_33: Cold_RestVas -> Cold_RestInt; TER_Kidney/RestVas*Cold_RestVas - TER_Kidney/RestInt*Cold_RestInt;
  inFlow_48: Hot_Art => Hot_RestVas; F_Kidney/Art*Hot_Art;
  inFlow_49: AlbHot_Art => AlbHot_RestVas; F_Kidney/Art*AlbHot_Art;
  inFlow_50: AlbCold_Art => AlbCold_RestVas; F_Kidney/Art*AlbCold_Art;
  inFlow_51: Cold_Art => Cold_RestVas; F_Kidney/Art*Cold_Art;
  outFlow_48: Hot_RestVas => Hot_Vein; F_Kidney/RestVas*Hot_RestVas;
  outFlow_49: AlbHot_RestVas => AlbHot_Vein; F_Kidney/RestVas*AlbHot_RestVas;
  outFlow_50: AlbCold_RestVas => AlbCold_Vein; F_Kidney/RestVas*AlbCold_RestVas;
  outFlow_51: Cold_RestVas => Cold_Vein; F_Kidney/RestVas*Cold_RestVas;
  decay_45: Hot_RestInt => Cold_RestInt; lambdaPhys*Hot_RestInt;
  decay_46: Hot_SkinVas => Cold_SkinVas; lambdaPhys*Hot_SkinVas;
  hotAlbBind_25: Hot_SkinVas + Albumin_SkinVas -> AlbHot_SkinVas; k_on_toAlb*Hot_SkinVas*Albumin_SkinVas/SkinVas - k_off_toAlb*AlbHot_SkinVas;
  albDecay_25: AlbHot_SkinVas => AlbCold_SkinVas; lambdaPhys*AlbHot_SkinVas;
  coldAlbBind_25: Cold_SkinVas + Albumin_SkinVas -> AlbCold_SkinVas; k_on_toAlb*Cold_SkinVas*Albumin_SkinVas/SkinVas - k_off_toAlb*AlbCold_SkinVas;
  Vas2Int_34: Hot_SkinVas -> Hot_SkinInt; TER_Kidney/SkinVas*Hot_SkinVas - TER_Kidney/SkinVas*Hot_SkinInt;
  Vas2Int_35: Cold_SkinVas -> Cold_SkinInt; TER_Kidney/SkinVas*Cold_SkinVas - TER_Kidney/SkinInt*Cold_SkinInt;
  inFlow_52: Hot_Art => Hot_SkinVas; F_Kidney/Art*Hot_Art;
  inFlow_53: AlbHot_Art => AlbHot_SkinVas; F_Kidney/Art*AlbHot_Art;
  inFlow_54: AlbCold_Art => AlbCold_SkinVas; F_Kidney/Art*AlbCold_Art;
  inFlow_55: Cold_Art => Cold_SkinVas; F_Kidney/Art*Cold_Art;
  outFlow_52: Hot_SkinVas => Hot_Vein; F_Kidney/SkinVas*Hot_SkinVas;
  outFlow_53: AlbHot_SkinVas => AlbHot_Vein; F_Kidney/SkinVas*AlbHot_SkinVas;
  outFlow_54: AlbCold_SkinVas => AlbCold_Vein; F_Kidney/SkinVas*AlbCold_SkinVas;
  outFlow_55: Cold_SkinVas => Cold_Vein; F_Kidney/SkinVas*Cold_SkinVas;
  decay_47: Hot_SkinInt => Cold_SkinInt; lambdaPhys*Hot_SkinInt;
  decay_48: Hot_MuscleVas => Cold_MuscleVas; lambdaPhys*Hot_MuscleVas;
  hotAlbBind_26: Hot_MuscleVas + Albumin_MuscleVas -> AlbHot_MuscleVas; k_on_toAlb*Hot_MuscleVas*Albumin_MuscleVas/MuscleVas - k_off_toAlb*AlbHot_MuscleVas;
  albDecay_26: AlbHot_MuscleVas => AlbCold_MuscleVas; lambdaPhys*AlbHot_MuscleVas;
  coldAlbBind_26: Cold_MuscleVas + Albumin_MuscleVas -> AlbCold_MuscleVas; k_on_toAlb*Cold_MuscleVas*Albumin_MuscleVas/MuscleVas - k_off_toAlb*AlbCold_MuscleVas;
  Vas2Int_36: Hot_MuscleVas -> Hot_MuscleInt; TER_Kidney/MuscleVas*Hot_MuscleVas - TER_Kidney/MuscleInt*Hot_MuscleInt;
  Vas2Int_37: Cold_MuscleVas -> Cold_MuscleInt; TER_Kidney/MuscleVas*Cold_MuscleVas - TER_Kidney/MuscleInt*Cold_MuscleInt;
  inFlow_56: Hot_Art => Hot_MuscleVas; F_Kidney/Art*Hot_Art;
  inFlow_57: AlbHot_Art => AlbHot_MuscleVas; F_Kidney/Art*AlbHot_Art;
  inFlow_58: AlbCold_Art => AlbCold_MuscleVas; F_Kidney/Art*AlbCold_Art;
  inFlow_59: Cold_Art => Cold_MuscleVas; F_Kidney/Art*Cold_Art;
  outFlow_56: Hot_MuscleVas => Hot_Vein; F_Kidney/MuscleVas*Hot_MuscleVas;
  outFlow_57: AlbHot_MuscleVas => AlbHot_Vein; F_Kidney/MuscleVas*AlbHot_MuscleVas;
  outFlow_58: AlbCold_MuscleVas => AlbCold_Vein; F_Kidney/MuscleVas*AlbCold_MuscleVas;
  outFlow_59: Cold_MuscleVas => Cold_Vein; F_Kidney/MuscleVas*Cold_MuscleVas;
  decay_49: Hot_MuscleInt => Cold_MuscleInt; lambdaPhys*Hot_MuscleInt;
  decay_50: Hot_BrainVas => Cold_BrainVas; lambdaPhys*Hot_BrainVas;
  hotAlbBind_27: Hot_BrainVas + Albumin_BrainVas -> AlbHot_BrainVas; k_on_toAlb*Hot_BrainVas*Albumin_BrainVas/BrainVas - k_off_toAlb*AlbHot_BrainVas;
  albDecay_27: AlbHot_BrainVas => AlbCold_BrainVas; lambdaPhys*AlbHot_BrainVas;
  coldAlbBind_27: Cold_BrainVas + Albumin_BrainVas -> AlbCold_BrainVas; k_on_toAlb*Cold_BrainVas*Albumin_BrainVas/BrainVas - k_off_toAlb*AlbCold_BrainVas;
  Vas2Int_38: Hot_BrainVas -> Hot_BrainInt; TER_Kidney/BrainVas*Hot_BrainVas - TER_Kidney/BrainInt*Hot_BrainInt;
  Vas2Int_39: Cold_BrainVas -> Cold_BrainInt; TER_Kidney/BrainVas*Cold_BrainVas - TER_Kidney/BrainInt*Cold_BrainInt;
  inFlow_60: Hot_Art => Hot_BrainVas; F_Kidney/Art*Hot_Art;
  inFlow_61: AlbHot_Art => AlbHot_BrainVas; F_Kidney/Art*AlbHot_Art;
  inFlow_62: AlbCold_Art => AlbCold_BrainVas; F_Kidney/Art*AlbCold_Art;
  inFlow_63: Cold_Art => Cold_BrainVas; F_Kidney/Art*Cold_Art;
  outFlow_60: Hot_BrainVas => Hot_Vein; F_Kidney/BrainVas*Hot_BrainVas;
  outFlow_61: AlbHot_BrainVas => AlbHot_Vein; F_Kidney/BrainVas*AlbHot_BrainVas;
  outFlow_62: AlbCold_BrainVas => AlbCold_Vein; F_Kidney/BrainVas*AlbCold_BrainVas;
  outFlow_63: Cold_BrainVas => Cold_Vein; F_Kidney/BrainVas*Cold_BrainVas;
  decay_51: Hot_BrainInt => Cold_BrainInt; lambdaPhys*Hot_BrainInt;
  decay_52: Hot_RedMarrowVas => Cold_RedMarrowVas; lambdaPhys*Hot_RedMarrowVas;
  hotAlbBind_28: Hot_RedMarrowVas + Albumin_RedMarrowVas -> AlbHot_RedMarrowVas; k_on_toAlb*Hot_RedMarrowVas*Albumin_RedMarrowVas/RedMarrowVas - k_off_toAlb*AlbHot_RedMarrowVas;
  albDecay_28: AlbHot_RedMarrowVas => AlbCold_RedMarrowVas; lambdaPhys*AlbHot_RedMarrowVas;
  coldAlbBind_28: Cold_RedMarrowVas + Albumin_RedMarrowVas -> AlbCold_RedMarrowVas; k_on_toAlb*Cold_RedMarrowVas*Albumin_RedMarrowVas/RedMarrowVas - k_off_toAlb*AlbCold_RedMarrowVas;
  Vas2Int_40: Hot_RedMarrowVas -> Hot_RedMarrowInt; TER_Kidney/RedMarrowVas*Hot_RedMarrowVas - TER_Kidney/RedMarrowInt*Hot_RedMarrowInt;
  Vas2Int_41: Cold_RedMarrowVas -> Cold_RedMarrowInt; TER_Kidney/RedMarrowVas*Cold_RedMarrowVas - TER_Kidney/RedMarrowInt*Cold_RedMarrowInt;
  inFlow_64: Hot_Art => Hot_RedMarrowVas; F_Kidney/Art*Hot_Art;
  inFlow_65: AlbHot_Art => AlbHot_RedMarrowVas; F_Kidney/Art*AlbHot_Art;
  inFlow_66: AlbCold_Art => AlbCold_RedMarrowVas; F_Kidney/Art*AlbCold_Art;
  inFlow_67: Cold_Art => Cold_RedMarrowVas; F_Kidney/Art*Cold_Art;
  outFlow_64: Hot_RedMarrowVas => Hot_Vein; F_Kidney/RedMarrowVas*Hot_RedMarrowVas;
  outFlow_65: AlbHot_RedMarrowVas => AlbHot_Vein; F_Kidney/RedMarrowVas*AlbHot_RedMarrowVas;
  outFlow_66: AlbCold_RedMarrowVas => AlbCold_Vein; F_Kidney/RedMarrowVas*AlbCold_RedMarrowVas;
  outFlow_67: Cold_RedMarrowVas => Cold_Vein; F_Kidney/RedMarrowVas*Cold_RedMarrowVas;
  decay_53: Hot_RedMarrowInt => Cold_RedMarrowInt; lambdaPhys*Hot_RedMarrowInt;
  decay_54: Hot_LungsVas => Cold_LungsVas; lambdaPhys*Hot_LungsVas;
  hotAlbBind_29: Hot_LungsVas + Albumin_LungsVas -> AlbHot_LungsVas; k_on_toAlb*Hot_LungsVas*Albumin_LungsVas/LungsVas - k_off_toAlb*AlbHot_LungsVas;
  albDecay_29: AlbHot_LungsVas => AlbCold_LungsVas; lambdaPhys*AlbHot_LungsVas;
  coldAlbBind_29: Cold_LungsVas + Albumin_LungsVas -> AlbCold_LungsVas; k_on_toAlb*Cold_LungsVas*Albumin_LungsVas/LungsVas - k_off_toAlb*AlbCold_LungsVas;
  Vas2Int_42: Hot_LungsVas -> Hot_LungsInt; PS_Lungs/LungsVas*Hot_LungsVas - PS_Lungs/LungsInt*Hot_LungsInt;
  Vas2Int_43: Cold_LungsVas -> Cold_LungsInt; PS_Lungs/LungsVas*Cold_LungsVas - PS_Lungs/LungsInt*Cold_LungsInt;
  inFlow_68: Hot_LungsVas => Hot_Art; F_Lungs/LungsVas*Hot_LungsVas;
  inFlow_69: AlbHot_LungsVas => AlbHot_Art; F_Lungs/LungsVas*AlbHot_LungsVas;
  inFlow_70: AlbCold_LungsVas => AlbCold_Art; F_Lungs/LungsVas*AlbCold_LungsVas;
  inFlow_71: Cold_LungsVas => Cold_Art; F_Lungs/LungsVas*Cold_LungsVas;
  outFlow_68: Hot_Vein => Hot_LungsVas; F_Lungs/Vein*Hot_Vein;
  outFlow_69: AlbHot_Vein => AlbHot_LungsVas; F_Lungs/Vein*AlbHot_Vein;
  outFlow_70: AlbCold_Vein => AlbCold_LungsVas; F_Lungs/Vein*AlbCold_Vein;
  outFlow_71: Cold_Vein => Cold_LungsVas; F_Lungs/Vein*Cold_Vein;
  decay_55: Hot_LungsInt => Cold_LungsInt; lambdaPhys*Hot_LungsInt;
  decay_56: Hot_AdiposeVas => Cold_AdiposeVas; lambdaPhys*Hot_AdiposeVas;
  hotAlbBind_30: Hot_AdiposeVas + Albumin_AdiposeVas -> AlbHot_AdiposeVas; k_on_toAlb*Hot_AdiposeVas*Albumin_AdiposeVas/AdiposeVas - k_off_toAlb*AlbHot_AdiposeVas;
  albDecay_30: AlbHot_AdiposeVas => AlbCold_AdiposeVas; lambdaPhys*AlbHot_AdiposeVas;
  coldAlbBind_30: Cold_AdiposeVas + Albumin_AdiposeVas -> AlbCold_AdiposeVas; k_on_toAlb*Cold_AdiposeVas*Albumin_AdiposeVas/AdiposeVas - k_off_toAlb*AlbCold_AdiposeVas;
  Vas2Int_44: Hot_AdiposeVas -> Hot_AdiposeInt; PS_Heart/AdiposeVas*Hot_AdiposeVas - PS_Heart/AdiposeInt*Hot_AdiposeInt;
  Vas2Int_45: Cold_AdiposeVas -> Cold_AdiposeInt; PS_Heart/AdiposeVas*Cold_AdiposeVas - PS_Heart/AdiposeInt*Cold_AdiposeInt;
  inFlow_72: Hot_Art => Hot_AdiposeVas; F_Heart/Art*Hot_Art;
  inFlow_73: AlbHot_Art => AlbHot_AdiposeVas; F_Heart/Art*AlbHot_Art;
  inFlow_74: AlbCold_Art => AlbCold_AdiposeVas; F_Heart/Art*AlbCold_Art;
  inFlow_75: Cold_Art => Cold_AdiposeVas; F_Heart/Art*Cold_Art;
  outFlow_72: Hot_AdiposeVas => Hot_Vein; F_Heart/AdiposeVas*Hot_AdiposeVas;
  outFlow_73: AlbHot_AdiposeVas => AlbHot_Vein; F_Heart/AdiposeVas*AlbHot_AdiposeVas;
  outFlow_74: AlbCold_AdiposeVas => AlbCold_Vein; F_Heart/AdiposeVas*AlbCold_AdiposeVas;
  outFlow_75: Cold_AdiposeVas => Cold_Vein; F_Heart/AdiposeVas*Cold_AdiposeVas;
  decay_57: Hot_AdiposeInt => Cold_AdiposeInt; lambdaPhys*Hot_AdiposeInt;
  Vas2IntKidney_Hot: Hot_KidneyVas => Hot_KidneyInt; GFR*phi/KidneyVas*Hot_KidneyVas;
  Vas2IntKidney_Cold: Cold_KidneyVas => Cold_KidneyInt; GFR*phi/KidneyVas*Cold_KidneyVas;
  Int2IntraHot: Hot_KidneyInt => Hot_KidneyIntera; GFR*phi*(1 - f_exc)/KidneyInt*Hot_KidneyInt;
  Int2IntraCold: Cold_KidneyInt => Cold_KidneyIntera; GFR*phi*(1 - f_exc)/KidneyInt*Cold_KidneyInt;
  Intra2VasHot: Hot_KidneyIntera => Hot_KidneyVas; GFR*phi*(1 - f_exc)/KidneyIntern*Hot_KidneyIntera;
  Intra2VasCold: Cold_KidneyIntera => Cold_KidneyVas; GFR*phi*(1 - f_exc)/KidneyIntern*Cold_KidneyIntera;
  KidneyExcCold: Cold_KidneyInt => ; GFR*phi*f_exc/KidneyInt*Cold_KidneyInt;
  KidneyExcHot: Hot_KidneyInt => ; GFR*phi*f_exc/KidneyInt*Hot_KidneyInt;
  Reaction_1: Hot_SpleenVas => Hot_LiverVas; F_Kidney/SpleenVas*Hot_SpleenVas;
  Reaction_2: Hot_GIVas => Hot_LiverVas; F_Kidney/GIVas*Hot_GIVas;
  Reaction_3: AlbHot_SpleenVas => AlbHot_LiverVas; F_Kidney/SpleenVas*AlbHot_SpleenVas;
  Reaction_4: AlbCold_SpleenVas => AlbCold_LiverVas; F_Kidney/SpleenVas*AlbCold_SpleenVas;
  Reaction_5: Cold_SpleenVas => Cold_LiverVas; F_Kidney/SpleenVas*Cold_SpleenVas;
  Reaction_6: AlbHot_GIVas => AlbHot_LiverVas; F_Kidney/GIVas*AlbHot_GIVas;
  Reaction_7: AlbCold_GIVas => AlbCold_LiverVas; F_Kidney/GIVas*AlbCold_GIVas;
  Reaction_8: Cold_GIVas => Cold_LiverVas; F_Kidney/GIVas*Cold_GIVas;
  Reaction_9: Albumin_Art => Albumin_Tumor2Vas; F_Kidney/Art*Albumin_Art;
  Reaction_10: Albumin_Art => Albumin_Tumor1Vas; F_Kidney/Art*Albumin_Art;
  Reaction_11: Albumin_Tumor1Vas => Albumin_Vein; F_Kidney/Tumor1Vas*Albumin_Tumor1Vas;
  Reaction_12: Albumin_Tumor2Vas => Albumin_Vein; F_Kidney/Tumor2Vas*Albumin_Tumor2Vas;
  Reaction_13: Albumin_Art => Albumin_KidneyVas; F_Kidney/Art*Albumin_Art;
  Reaction_14: Albumin_KidneyVas => Albumin_Vein; F_Kidney/KidneyVas*Albumin_KidneyVas;
  Reaction_15: Albumin_Art => Albumin_SpleenVas; F_Kidney/Art*Albumin_Art;
  Reaction_16: Albumin_SpleenVas => Albumin_Vein; F_Kidney/SpleenVas*Albumin_SpleenVas;
  Reaction_17: Albumin_Art => Albumin_ProstateVas; F_Kidney/Art*Albumin_Art;
  Reaction_18: Albumin_ProstateVas => Albumin_Vein; F_Kidney/ProstateVas*Albumin_ProstateVas;
  Reaction_19: Albumin_Art => Albumin_GIVas; F_Kidney/Art*Albumin_Art;
  Reaction_20: Albumin_GIVas => Albumin_Vein; F_Kidney/GIVas*Albumin_GIVas;
  Reaction_21: Albumin_Art => Albumin_SkinVas; F_Kidney/Art*Albumin_Art;
  Reaction_22: Albumin_SkinVas => Albumin_Vein; F_Kidney/SkinVas*Albumin_SkinVas;
  Reaction_23: Albumin_Art => Albumin_BrainVas; F_Kidney/Art*Albumin_Art;
  Reaction_24: Albumin_BrainVas => Albumin_Vein; F_Kidney/BrainVas*Albumin_BrainVas;
  Reaction_25: Albumin_Vein => Albumin_LungsVas; F_Lungs/Vein*Albumin_Vein;
  Reaction_26: Albumin_LungsVas => Albumin_Art; F_Lungs/LungsVas*Albumin_LungsVas;
  Reaction_27: Albumin_Art => Albumin_HeartVas; F_Heart/Art*Albumin_Art;
  Reaction_28: Albumin_HeartVas => Albumin_Vein; F_Heart/HeartVas*Albumin_HeartVas;
  Reaction_29: Albumin_Art => Albumin_BoneVas; F_Heart/Art*Albumin_Art;
  Reaction_30: Albumin_BoneVas => Albumin_Vein; F_Heart/BoneVas*Albumin_BoneVas;
  Reaction_31: Albumin_Art => Albumin_AdiposeVas; F_Heart/Art*Albumin_Art;
  Reaction_32: Albumin_AdiposeVas => Albumin_Vein; F_Heart/AdiposeVas*Albumin_AdiposeVas;
  Reaction_33: Albumin_Art => Albumin_RedMarrowVas; F_Kidney/Art*Albumin_Art;
  Reaction_34: Albumin_RedMarrowVas => Albumin_Vein; F_Kidney/RedMarrowVas*Albumin_RedMarrowVas;
  Reaction_35: Albumin_Art => Albumin_MuscleVas; F_Kidney/Art*Albumin_Art;
  Reaction_36: Albumin_MuscleVas => Albumin_Vein; F_Kidney/MuscleVas*Albumin_MuscleVas;
  Reaction_37: Albumin_Art => Albumin_RestVas; F_Kidney/Art*Albumin_Art;
  Reaction_38: Albumin_RestVas => Albumin_Vein; F_Kidney/RestVas*Albumin_RestVas;
  Reaction_39: Albumin_Art => Albumin_LiverVas; F_Kidney/Art*Albumin_Art;
  Reaction_40: Albumin_LiverVas => Albumin_Vein; F_Kidney/LiverVas*Albumin_LiverVas;
  Reaction_41: Albumin_Art => Albumin_SGVas; F_Kidney/Art*Albumin_Art;
  Reaction_42: Albumin_SGVas => Albumin_Vein; F_Kidney/SGVas*Albumin_SGVas;
  Reaction_43: Albumin_Art => Albumin_TumorRestVas; F_Kidney/Art*Albumin_Art;
  Reaction_44: Albumin_TumorRestVas => Albumin_Vein; F_Kidney/TumorRestVas*Albumin_TumorRestVas;
  Reaction_45: Albumin_Tumor2Vas -> Albumin_Tumor2Int; PSAlb_TumorRest/Tumor2Vas*Albumin_Tumor2Vas - PSAlb_TumorRest/Tumor2Int*Albumin_Tumor2Int;
  Reaction_46: Albumin_Tumor1Vas -> Albumin_Tumor1Int; PSAlb_TumorRest/Tumor1Vas*Albumin_Tumor1Vas - PSAlb_TumorRest/Tumor1Int*Albumin_Tumor1Int;
  Reaction_47: Albumin_TumorRestVas -> Albumin_TumorRestInt; PSAlb_TumorRest/TumorRestVas*Albumin_TumorRestVas - PSAlb_TumorRest/TumorRestInt*Albumin_TumorRestInt;

  // Unit definitions:
  unit MWBUILTINUNIT_liter = metre^3 * 1e-3 dimensionless;
  unit MWBUILTINPREFIX_nano_MWBUILTINUNIT_mole = 1e-9 mole; MWBUILTINPREFIX_nano_MWBUILTINUNIT_mole is "nanomole";
  unit MWDERIVEDUNIT_1__minute = 0.01666667 dimensionless / second; MWDERIVEDUNIT_1__minute is "1/minute";
  unit MWDERIVEDUNIT_liter__nanomole__minute = metre^3 * 16666.67 dimensionless / (mole * second); MWDERIVEDUNIT_liter__nanomole__minute is "liter/nanomole/minute";
  unit MWDERIVEDUNIT_liter__minute = metre^3 * 1.666667e-5 dimensionless / second; MWDERIVEDUNIT_liter__minute is "liter/minute";
  unit MWDERIVEDUNIT_nanomole__liter = mole * 1e-6 dimensionless / metre^3; MWDERIVEDUNIT_nanomole__liter is "nanomole/liter";
  unit MWDERIVEDUNIT_kilogram__liter = gram * 1000000 dimensionless / metre^3; MWDERIVEDUNIT_kilogram__liter is "kilogram/liter";
  unit MWDERIVEDUNIT_meter___2 = metre^2 * dimensionless; MWDERIVEDUNIT_meter___2 is "meter^2";
  unit MWBUILTINUNIT_meter = metre;
  unit MWBUILTINUNIT_minute = 60 second;
  unit MWDERIVEDUNIT_nanomole__minute = mole * 1.666667e-11 dimensionless / second; MWDERIVEDUNIT_nanomole__minute is "nanomole/minute";
  unit MWDERIVEDUNIT_liter__kilogram = metre^3 * 1e-6 dimensionless / gram; MWDERIVEDUNIT_liter__kilogram is "liter/kilogram";
end
